# OpenSim document version 40000
AnalyzeTool bodyKinematics:
  model_file: ..\Static\MocoScaledModel_StrengthScaled.osim
  replace_force_set: false
  results_directory: ./
  output_precision: 8
  initial_time: 1.2195
  final_time: 1.581
  solve_for_equilibrium_for_auxiliary_states: false
  maximum_number_of_integrator_steps: 20000
  maximum_integrator_step_size: 1
  minimum_integrator_step_size: 1e-8
  integrator_error_tolerance: 1e-5
  coordinates_file: coordinates.sto
  lowpass_cutoff_frequency_for_coordinates: -1
  AnalysisSet Analyses:
    BodyKinematics: start_time=1.2195 end_time=1.581 step_interval=1 in_degrees=false bodies=torso
        express_results_in_body_local_frame=false
    StatesReporter: start_time=1.2195 end_time=1.581 step_interval=1 in_degrees=false
