# OpenSim document version 40000
ScaleTool:
  mass: 62.39569 [kg]
  height: -1
  age: -1
  GenericModelMaker:
    model_file: \\rds.shares.deakin.edu.au\rds\RDS27024-GaitLabResearch\PatellofemoralPain\TrunkInclination_PFJLoading\predictive-gait-sims-pfjloading-mtlb\GenericModel\Moco_3Dwalking_TrunkMotion.osim
  ModelScaler:
    apply: true
    scaling_order: measurements
    marker_file: \\rds.shares.deakin.edu.au\rds\RDS27024-GaitLabResearch\PatellofemoralPain\TrunkInclination_PFJLoading\predictive-gait-sims-pfjloading-mtlb\ExpData\Static\static.trc
    time_range: 0.5 1.5
    preserve_mass_distribution: true
    output_model_file: \\rds.shares.deakin.edu.au\rds\RDS27024-GaitLabResearch\PatellofemoralPain\TrunkInclination_PFJLoading\predictive-gait-sims-pfjloading-mtlb\ExpData\Static\MocoScaledModel.osim
    output_scale_file: \\rds.shares.deakin.edu.au\rds\RDS27024-GaitLabResearch\PatellofemoralPain\TrunkInclination_PFJLoading\predictive-gait-sims-pfjloading-mtlb\ExpData\Static\ScaleSet.xml
    MeasurementSet:
      Measurement torso_height: apply=true
        MarkerPair: markers=(RACR RPSI)
        MarkerPair: markers=(RACR RASI)
        MarkerPair: markers=(LACR LPSI)
        MarkerPair: markers=(LACR LASI)
        BodyScale torso: axes=Y
      Measurement torso_breadth: apply=true
        MarkerPair: markers=(C7 CLAV)
        BodyScale torso: axes=X
      Measurement torso_width: apply=true
        MarkerPair: markers=(RACR LACR)
        BodyScale torso: axes=Z
      Measurement pelvis_w: apply=true
        MarkerPair: markers=(RASI LASI)
        MarkerPair: markers=(RPSI LPSI)
        BodyScale pelvis: axes=Z
      Measurement pelvis_d: apply=true
        MarkerPair: markers=(RASI RPSI)
        MarkerPair: markers=(LASI LPSI)
        BodyScale pelvis: axes=(X Y)
      Measurement r_thigh_length: apply=true
        MarkerPair: markers=(RASI RLFC)
        MarkerPair: markers=(RASI RMFC)
        BodyScale femur_r: axes=Y
        BodyScale patella_r: axes=(X Y Z)
      Measurement r_thigh_breadth: apply=true
        MarkerPair: markers=(RLFC RMFC)
        BodyScale femur_r: axes=(X Z)
      Measurement r_tibia_length: apply=true
        MarkerPair: markers=(RLFC RLMAL)
        MarkerPair: markers=(RMFC RMMAL)
        BodyScale tibia_r: axes=Y
        BodyScale talus_r: axes=Y
      Measurement r_tibia_breadth: apply=true
        MarkerPair: markers=(RLMAL RMMAL)
        BodyScale tibia_r: axes=(X Z)
        BodyScale talus_r: axes=(X Z)
      Measurement r_foot_length: apply=true
        MarkerPair: markers=(RCAL RMT1)
        MarkerPair: markers=(RCAL RMT5)
        BodyScale calcn_r: axes=(X Y)
        BodyScale toes_r: axes=(X Y)
      Measurement r_foot_width: apply=true
        MarkerPair: markers=(RMT1 RMT5)
        BodyScale calcn_r: axes=Z
        BodyScale toes_r: axes=Z
      Measurement l_thigh_length: apply=true
        MarkerPair: markers=(LASI LLFC)
        MarkerPair: markers=(LASI LMFC)
        BodyScale femur_l: axes=Y
        BodyScale patella_l: axes=(X Y Z)
      Measurement l_thigh_breadth: apply=true
        MarkerPair: markers=(LLFC LMFC)
        BodyScale femur_l: axes=(X Z)
      Measurement l_tibia_length: apply=true
        MarkerPair: markers=(LLFC LLMAL)
        MarkerPair: markers=(LMFC LMMAL)
        BodyScale tibia_l: axes=Y
        BodyScale talus_l: axes=Y
      Measurement l_tibia_breadth: apply=true
        MarkerPair: markers=(LLMAL LMMAL)
        BodyScale tibia_l: axes=(X Z)
        BodyScale talus_l: axes=(X Z)
      Measurement l_foot_length: apply=true
        MarkerPair: markers=(LCAL LMT1)
        MarkerPair: markers=(LCAL LMT5)
        BodyScale calcn_l: axes=(X Y)
        BodyScale toes_l: axes=(X Y)
      Measurement l_foot_width: apply=true
        MarkerPair: markers=(LMT1 LMT5)
        BodyScale calcn_l: axes=Z
        BodyScale toes_l: axes=Z
  MarkerPlacer:
    apply: true
    marker_file: \\rds.shares.deakin.edu.au\rds\RDS27024-GaitLabResearch\PatellofemoralPain\TrunkInclination_PFJLoading\predictive-gait-sims-pfjloading-mtlb\ExpData\Static\static.trc
    time_range: 0.5 1.5
    max_marker_movement: -1
    IKTaskSet:
      IKMarkerTask C7: apply=true weight=3
      IKMarkerTask T10: apply=true weight=3
      IKMarkerTask CLAV: apply=true weight=3
      IKMarkerTask STRN: apply=true weight=2
      IKMarkerTask RACR: apply=true weight=3
      IKMarkerTask LACR: apply=true weight=3
      IKMarkerTask RASI: apply=true weight=5
      IKMarkerTask LASI: apply=true weight=5
      IKMarkerTask LPSI: apply=true weight=5
      IKMarkerTask RPSI: apply=true weight=5
      IKMarkerTask RTH1: apply=true weight=3
      IKMarkerTask RTH2: apply=true weight=3
      IKMarkerTask RTH3: apply=true weight=3
      IKMarkerTask RLFC: apply=true weight=6
      IKMarkerTask RMFC: apply=true weight=6
      IKMarkerTask RTB1: apply=true weight=3
      IKMarkerTask RTB2: apply=true weight=3
      IKMarkerTask RTB3: apply=true weight=3
      IKMarkerTask RLMAL: apply=true weight=7
      IKMarkerTask RMMAL: apply=true weight=7
      IKMarkerTask RCAL: apply=true weight=4
      IKMarkerTask RMT5: apply=true weight=3
      IKMarkerTask RMT1: apply=true weight=3
      IKMarkerTask LTH1: apply=true weight=3
      IKMarkerTask LTH2: apply=true weight=3
      IKMarkerTask LTH3: apply=true weight=3
      IKMarkerTask LLFC: apply=true weight=6
      IKMarkerTask LMFC: apply=true weight=6
      IKMarkerTask LTB1: apply=true weight=3
      IKMarkerTask LTB2: apply=true weight=3
      IKMarkerTask LTB3: apply=true weight=3
      IKMarkerTask LLMAL: apply=true weight=7
      IKMarkerTask LMMAL: apply=true weight=7
      IKMarkerTask LCAL: apply=true weight=4
      IKMarkerTask LMT5: apply=true weight=3
      IKMarkerTask LMT1: apply=true weight=3
