# OpenSim document version 40000
MocoInverse gaitInverse:
  initial_time: 1.2195
  final_time: 1.581
  mesh_interval: 0.02
  kinematics_allow_extra_columns: true
  ModelProcessor model:
    operators:
      ModOpAddExternalLoads: filepath=G:\+GitRepos+\predictive-gait-sims-pfjloading-mtlb\ExpData\Static\..\Gait\Jog05_grf.xml
      ModOpIgnoreTendonCompliance
      ModOpReplaceMusclesWithDeGrooteFregly2016
      ModOpIgnorePassiveFiberForcesDGF
      ModOpScaleActiveFiberForceCurveWidthDGF: scale_factor=1.5
      ModOpAddReserves: optimal_force=2
    model: Model:
      gravity: 0 -9.80665 0
      length_units: meters
      force_units: N
      credits:
        Arnold, E.M., Hamner, S.R., Ward, S.R., Lieber, R. L., and Delp, S.L.
      Ground
      BodySet:
        Body pelvis: mass=12.74323 [kg] mass_center=(-0.09362764 0 0) inertia=(0.1181116 0.1181116 0.06005414 0 0 0)
            meshes=(r_pelvis.vtp l_pelvis.vtp sacrum.vtp)
          WrapCylinder Gmax1_at_pelvis_r: xyz_body_rotation=(-0.6 0.45 0)
              translation=(-0.1019707 -0.1055122 0.06241934) quadrant=-x radius=0.04681407 length=0.1659227
          WrapCylinder Gmax2_at_pelvis_r: xyz_body_rotation=(-0.75 0.39 0)
              translation=(-0.1059436 -0.08845966 0.0695822) quadrant=all radius=0.04696495 length=0.1101328
          WrapCylinder Gmax3_at_pelvis_r: xyz_body_rotation=(-0.1 0 0) translation=(-0.109916 -0.09378852 0.0695822)
              quadrant=all radius=0.04780464 length=0.1024532
          WrapCylinder Gmax1_at_pelvis_l: xyz_body_rotation=(0.6 -0.45 0)
              translation=(-0.1019707 -0.1055122 -0.06241934) quadrant=-x radius=0.04681407 length=0.1659227
          WrapCylinder Gmax2_at_pelvis_l: xyz_body_rotation=(0.75 -0.39 0)
              translation=(-0.1059436 -0.08845966 -0.0695822) quadrant=all radius=0.04696495 length=0.1101328
          WrapCylinder Gmax3_at_pelvis_l: xyz_body_rotation=(0.1 0 0) translation=(-0.109916 -0.09378852 -0.0695822)
              quadrant=all radius=0.04780464 length=0.1024532
          WrapCylinder PS_at_brim_r: xyz_body_rotation=(-0.25 -0.27 0.1)
              translation=(-0.09799783 -0.06394669 0.06712632) quadrant=-y radius=0.0593304 length=0.1052661
          WrapCylinder PS_at_brim_l: xyz_body_rotation=(0.25 0.27 0.1)
              translation=(-0.09799783 -0.06394669 -0.06712632) quadrant=-y radius=0.0593304 length=0.1052661
          WrapCylinder IL_at_brim_r: xyz_body_rotation=(-0.32 -0.24 0.9)
              translation=(-0.09402494 -0.06927566 0.07735901) quadrant=-y radius=0.06549407 length=0.1052041
          WrapCylinder IL_at_brim_l: xyz_body_rotation=(0.32 0.24 0.9)
              translation=(-0.09402494 -0.06927566 -0.07735901) quadrant=-y radius=0.06549407 length=0.1052041
        Body femur_r: mass=7.736854 mass_center=(0 -0.1643064 0) inertia=(0.102238 0.02680019 0.1078119 0 0 0)
            meshes=r_femur.vtp
          WrapCylinder Gastroc_at_condyles_r: translation=(0.004065718 -0.3962683 0) quadrant=all radius=0.02224564
              length=0.08131435
          WrapCylinder KnExt_at_fem_r: xyz_body_rotation=(-0.0623366 0.0507601 0)
              translation=(0.002917785 -0.3892434 0.00170037) quadrant=all radius=0.02223881 length=0.08137929
          WrapCylinder AB_at_femshaft_r: xyz_body_rotation=(1.66157 0.186644 0)
              translation=(0.0119072 -0.108824 0.01899912) quadrant=all radius=0.01347535 length=0.0672355
          WrapCylinder AL_at_femshaft_r: xyz_body_rotation=(1.77711 0.136489 0)
              translation=(0.02499007 -0.2241421 0.01228959) quadrant=all radius=0.01644452 length=0.09580412
          WrapCylinder AMprox_at_femshaft_r: xyz_body_rotation=(1.61126 0.18656 0)
              translation=(0.004214511 -0.07045339 0.02065631) quadrant=all radius=0.01722082 length=0.06729897
          WrapCylinder AMmid_at_femshaft_r: xyz_body_rotation=(1.61139 0.13656 0)
              translation=(0.01871249 -0.1553283 0.01673794) quadrant=all radius=0.01743739 length=0.1156391
          WrapCylinder AMdist_at_femshaft_r: xyz_body_rotation=(1.71188 0.186636 0)
              translation=(0.0257006 -0.2520033 0.007614766) quadrant=all radius=0.01782415 length=0.1917842
          WrapCylinder AMisch_at_condyles_r: xyz_body_rotation=(1.71115 -0.463363 0)
              translation=(-0.01841863 -0.3642101 -0.002564958) quadrant=all radius=0.03323594 length=0.2245429
          WrapCylinder PECT_at_femshaft_r: xyz_body_rotation=(1.81295 0.276344 0)
              translation=(0.004948572 -0.08167275 0.0247525) quadrant=all radius=0.01235679 length=0.04741556
        Body tibia_r: mass=3.083878 mass_center=(0 -0.2241798 0) inertia=(0.05535676 0.005601575 0.05612554 0 0 0)
            meshes=(r_tibia.vtp r_fibula.vtp)
          WrapCylinder GasLat_at_shank_r: xyz_body_rotation=(2.96723 -0.279725 -1.47812)
              translation=(-0.006877411 -0.08885554 -0.003066954) quadrant=-y radius=0.0584298 length=0.0937986
          WrapCylinder GasMed_at_shank_r: xyz_body_rotation=(2.96723 0.0279725 -1.47812)
              translation=(-0.006877411 -0.08885554 -0.003066954) quadrant=-y radius=0.05839291 length=0.09386854
          WrapCylinder GR_at_condyles_r: xyz_body_rotation=(0 -0.4 0) translation=(-0.00278814 -0.02401501 0)
              quadrant=all radius=0.03834235 length=0.09293799
          WrapCylinder SM_at_condyles_r: xyz_body_rotation=(0 -0.1 0) translation=(-0.0009293799 -0.02401501 0)
              quadrant=all radius=0.0374903 length=0.09293799
          WrapCylinder ST_at_condyles_r: xyz_body_rotation=(0 -0.2 0) translation=(-0.00185876 -0.02461539 0)
              quadrant=all radius=0.04526527 length=0.09293799
          WrapCylinder BF_at_gastroc_r: translation=(-0.05390404 -0.07204503 0) quadrant=y radius=0.03195196
              length=0.139407
        Body patella_r: mass=0.07170069 mass_center=(0.001739714 0.02551581 0)
            inertia=(2.230449e-6 1.018857e-5 1.018857e-5 0 0 0) meshes=r_patella.vtp
        Body talus_r: mass=0.08317945 mass_center=(0 0 0) inertia=(0.002069104 0.001578154 0.001578154 0 0 0)
            meshes=r_talus.vtp
        Body calcn_r: mass=1.039743 mass_center=(0.1029743 0.04487968 0)
            inertia=(0.002896741 0.00492742 0.00492742 0 0 0) meshes=r_foot.vtp
        Body toes_r: mass=0.1801667 mass_center=(0.03562897 0.008975946 -0.02092503)
            inertia=(0.0002069104 0.0002665357 0.0002665357 0 0 0) meshes=r_bofoot.vtp
        Body femur_l: mass=7.736854 mass_center=(0 -0.1570192 0) inertia=(0.102238 0.02680019 0.1078119 0 0 0)
            meshes=l_femur.vtp
          WrapCylinder Gastroc_at_condyles_l: translation=(0.004271776 -0.3786933 0) quadrant=all radius=0.02222497
              length=0.08543552
          WrapCylinder KnExt_at_fem_l: xyz_body_rotation=(0.0623366 -0.0507601 0)
              translation=(0.003065664 -0.37198 -0.001786548) quadrant=all radius=0.02222174 length=0.08546342
          WrapCylinder AB_at_femshaft_l: xyz_body_rotation=(-1.66157 -0.186644 0)
              translation=(0.01251069 -0.1039975 -0.01996204) quadrant=all radius=0.01412203 length=0.06445687
          WrapCylinder AL_at_femshaft_l: xyz_body_rotation=(-1.77711 -0.136489 0)
              translation=(0.02625662 -0.2142011 -0.01291245) quadrant=all radius=0.01721573 length=0.09196522
          WrapCylinder AMprox_at_femshaft_l: xyz_body_rotation=(-1.61126 -0.18656 0)
              translation=(0.004428111 -0.0673287 -0.02170321) quadrant=all radius=0.01805423 length=0.06448676
          WrapCylinder AMmid_at_femshaft_l: xyz_body_rotation=(-1.61139 -0.13656 0)
              translation=(0.01966087 -0.1484393 -0.01758625) quadrant=all radius=0.01829873 length=0.1106757
          WrapCylinder AMdist_at_femshaft_l: xyz_body_rotation=(-1.71188 -0.186636 0)
              translation=(0.02700315 -0.2408267 -0.008000698) quadrant=all radius=0.01866695 length=0.1840132
          WrapCylinder AMisch_at_condyles_l: xyz_body_rotation=(-1.71115 0.463363 0)
              translation=(-0.01935213 -0.3480569 0.002694956) quadrant=all radius=0.03448253 length=0.2181988
          WrapCylinder PECT_at_femshaft_l: xyz_body_rotation=(-1.81295 -0.276344 0)
              translation=(0.005199376 -0.07805047 -0.026007) quadrant=all radius=0.01288417 length=0.04575445
        Body tibia_l: mass=3.083878 mass_center=(0 -0.2414471 0) inertia=(0.05535676 0.005601575 0.05612554 0 0 0)
            meshes=(l_tibia.vtp l_fibula.vtp)
          WrapCylinder GasLat_at_shank_l: xyz_body_rotation=(-2.96723 0.279725 -1.47812)
              translation=(-0.007158557 -0.09569957 0.00319233) quadrant=-y radius=0.06199719 length=0.09779007
          WrapCylinder GasMed_at_shank_l: xyz_body_rotation=(-2.96723 -0.0279725 -1.47812)
              translation=(-0.007158557 -0.09569957 0.00319233) quadrant=-y radius=0.06194956 length=0.09787555
          WrapCylinder GR_at_condyles_l: xyz_body_rotation=(0 0.4 0) translation=(-0.002902118 -0.02586475 0)
              quadrant=all radius=0.04069098 length=0.09673726
          WrapCylinder SM_at_condyles_l: xyz_body_rotation=(0 0.1 0) translation=(-0.0009673726 -0.02586475 0)
              quadrant=all radius=0.03978674 length=0.09673726
          WrapCylinder ST_at_condyles_l: xyz_body_rotation=(0 0.2 0) translation=(-0.001934745 -0.02651137 0)
              quadrant=all radius=0.04803796 length=0.09673726
          WrapCylinder BF_at_gastroc_l: translation=(-0.05610761 -0.07759425 0) quadrant=all radius=0.03390915
              length=0.1451059
        Body patella_l: mass=0.07170069 mass_center=(0.001662556 0.02438415 0)
            inertia=(2.03699e-6 9.304859e-6 9.304859e-6 0 0 0) meshes=l_patella.vtp
        Body talus_l: mass=0.08317945 mass_center=(0 0 0) inertia=(0.002069104 0.001578154 0.001578154 0 0 0)
            meshes=l_talus.vtp
        Body calcn_l: mass=1.039743 mass_center=(0.1018638 0.0443957 0)
            inertia=(0.002896741 0.00492742 0.00492742 0 0 0) meshes=l_foot.vtp
        Body toes_l: mass=0.1801667 mass_center=(0.03524475 0.008879149 0.01886859)
            inertia=(0.0002069104 0.0002665357 0.0002665357 0 0 0) meshes=l_bofoot.vtp
        Body torso: mass=25.26141 mass_center=(-0.01360312 0.3911278 -0.002346957)
            inertia=(1.725999 0.9204441 1.725999 0 0 0)
            meshes=(hat_spine.vtp hat_jaw.vtp hat_skull.vtp hat_ribs_scap.vtp)
      JointSet:
        CustomJoint ground_pelvis: socket_parent_frame=ground_offset socket_child_frame=pelvis_offset
          Coordinate pelvis_tilt: default_value=0 range=(-1.570796 1.570796) clamped=true
          Coordinate pelvis_list: default_value=0 range=(-1.570796 1.570796) clamped=true
          Coordinate pelvis_rotation: default_value=0 range=(-1.570796 1.570796) clamped=true
          Coordinate pelvis_tx: default_value=0 range=(-5 5) clamped=true
          Coordinate pelvis_ty: default_value=0.93 range=(-1 2) clamped=true
          Coordinate pelvis_tz: default_value=0 range=(-3 3) clamped=true
          PhysicalOffsetFrame ground_offset: socket_parent=/ground translation=(0 0 0) [meters]
          PhysicalOffsetFrame pelvis_offset: socket_parent=/bodyset/pelvis translation=(0 0 0)
          SpatialTransform:
            TransformAxis rotation1: coordinates=pelvis_tilt axis=(0 0 1) LinearFunction(coefficients=1 0)
            TransformAxis rotation2: coordinates=pelvis_list axis=(1 0 0) LinearFunction(coefficients=1 0)
            TransformAxis rotation3: coordinates=pelvis_rotation axis=(0 1 0) LinearFunction(coefficients=1 0)
            TransformAxis translation1: coordinates=pelvis_tx axis=(1 0 0) LinearFunction(coefficients=1 0)
            TransformAxis translation2: coordinates=pelvis_ty axis=(0 1 0) LinearFunction(coefficients=1 0)
            TransformAxis translation3: coordinates=pelvis_tz axis=(0 0 1) LinearFunction(coefficients=1 0)
        CustomJoint hip_r: socket_parent_frame=pelvis_offset socket_child_frame=femur_r_offset
          Coordinate hip_flexion_r: default_value=0 range=(-0.5235988 2.094395) clamped=true
          Coordinate hip_adduction_r: default_value=0 range=(-0.8726646 0.5235988) clamped=true
          Coordinate hip_rotation_r: default_value=0 range=(-0.6981317 0.6981317) clamped=true
          PhysicalOffsetFrame pelvis_offset: socket_parent=/bodyset/pelvis
              translation=(-0.07452599 -0.08365302 0.07905762)
          PhysicalOffsetFrame femur_r_offset: socket_parent=/bodyset/femur_r translation=(0 0 0)
          SpatialTransform: axes_held_at_zero=(translation1 translation2 translation3)
            TransformAxis rotation1: coordinates=hip_flexion_r axis=(0 0 1) LinearFunction(coefficients=1 0)
            TransformAxis rotation2: coordinates=hip_adduction_r axis=(1 0 0) LinearFunction(coefficients=1 0)
            TransformAxis rotation3: coordinates=hip_rotation_r axis=(0 1 0) LinearFunction(coefficients=1 0)
        CustomJoint walker_knee_r: socket_parent_frame=femur_r_offset socket_child_frame=tibia_r_offset
          Coordinate knee_angle_r: default_value=0 range=(0 2.0944) clamped=true
          PhysicalOffsetFrame femur_r_offset: socket_parent=/bodyset/femur_r
              translation=(-0.006578331 -0.3942969 -0.002236145) orientation=(-1.64157 1.44618 1.5708) [radians]
          PhysicalOffsetFrame tibia_r_offset: socket_parent=/bodyset/tibia_r
              translation=(-0.007518255 -0.004244418 -0.001379891) orientation=(-1.64157 1.44618 1.5708)
          SpatialTransform: axes_held_at_zero=translation3
            TransformAxis rotation1: coordinates=knee_angle_r axis=(1 0 0) LinearFunction(coefficients=1 0)
            TransformAxis rotation2: coordinates=knee_angle_r axis=(0 0 1)
              SimmSpline: x=(0 0.174533 0.349066 0.523599 0.698132 0.872665 1.0472 1.22173 1.39626 1.5708 1.74533 1.91986 2.0944)
                  y=(0 0.0126809 0.0226969 0.0296054 0.0332049 0.0335354 0.0308779 0.0257548 0.0189295 0.011407 0.00443314 -0.00050475 -0.0016782)
            TransformAxis rotation3: coordinates=knee_angle_r axis=(0 1 0)
              SimmSpline: x=(0 0.174533 0.349066 0.523599 0.698132 0.872665 1.0472 1.22173 1.39626 1.5708 1.74533 1.91986 2.0944)
                  y=(0 0.059461 0.109399 0.150618 0.18392 0.210107 0.229983 0.24435 0.254012 0.25977 0.262428 0.262788 0.261654)
            TransformAxis translation1: coordinates=knee_angle_r axis=(0 1 0)
              MultiplierFunction: scale=0.966508
                SimmSpline: x=(0 0.174533 0.349066 0.523599 0.698132 0.872665 1.0472 1.22173 1.39626 1.5708 1.74533 1.91986 2.0944)
                    y=(0 0.000479 0.000835 0.001086 0.001251 0.001346 0.001391 0.001403 0.0014 0.0014 0.001421 0.001481 0.001599)
            TransformAxis translation2: coordinates=knee_angle_r axis=(0 0 1)
              MultiplierFunction: scale=0.8131435
                SimmSpline: x=(0 0.174533 0.349066 0.523599 0.698132 0.872665 1.0472 1.22173 1.39626 1.5708 1.74533 1.91986 2.0944)
                    y=(0 0.000988 0.001899 0.002734 0.003492 0.004173 0.004777 0.005305 0.005756 0.00613 0.006427 0.006648 0.006792)
        CustomJoint patellofemoral_r: socket_parent_frame=femur_r_offset socket_child_frame=patella_r_offset
          Coordinate knee_angle_r_beta: default_value=0 range=(-99999.9 99999.9) clamped=false
          PhysicalOffsetFrame femur_r_offset: socket_parent=/bodyset/femur_r
              translation=(-0.006578331 -0.3942969 -0.002236145)
          PhysicalOffsetFrame patella_r_offset: socket_parent=/bodyset/patella_r translation=(0 0 0)
          SpatialTransform: axes_held_at_zero=(rotation2 rotation3)
            TransformAxis rotation1: coordinates=knee_angle_r_beta axis=(0 0 1)
              SimmSpline: x=(0 0.174533 0.349066 0.523599 0.698132 0.872665 1.0472 1.22173 1.39626 1.5708 1.74533 1.91986 2.0944)
                  y=(0.00113686 -0.00629212 -0.105582 -0.253683 -0.414245 -0.579047 -0.747244 -0.91799 -1.09044 -1.26379 -1.43763 -1.61186 -1.78634)
            TransformAxis translation1: coordinates=knee_angle_r_beta axis=(1 0 0)
              MultiplierFunction: scale=0.8131435
                SimmSpline f9: x=(0 0.174533 0.349066 0.523599 0.698132 0.872665 1.0472 1.22173 1.39626 1.5708 1.74533 1.91986 2.0944)
                    y=(0.0524 0.0488 0.0437 0.0371 0.0296 0.0216 0.0136 0.0057 -0.0019 -0.0088 -0.0148 -0.0196 -0.0227)
            TransformAxis translation2: coordinates=knee_angle_r_beta axis=(0 1 0)
              MultiplierFunction: scale=0.966508
                SimmSpline f10: x=(0 0.174533 0.349066 0.523599 0.698132 0.872665 1.0472 1.22173 1.39626 1.5708 1.74533 1.91986 2.0944)
                    y=(-0.0108 -0.019 -0.0263 -0.0322 -0.0367 -0.0395 -0.0408 -0.0404 -0.0384 -0.0349 -0.0301 -0.0245 -0.0187)
            TransformAxis translation3: axis=(0 0 1) MultiplierFunction(scale=0.8131435, Constant(value=0.00275))
        PinJoint ankle_r: socket_parent_frame=tibia_r_offset socket_child_frame=talus_r_offset
          Coordinate ankle_angle_r: default_value=0 range=(-0.4 0.4) clamped=true
          PhysicalOffsetFrame tibia_r_offset: socket_parent=/bodyset/tibia_r translation=(-0.009293799 -0.4803002 0)
              orientation=(0.175895 -0.105208 0.0186622)
          PhysicalOffsetFrame talus_r_offset: socket_parent=/bodyset/talus_r translation=(0 0 0)
              orientation=(0.175895 -0.105208 0.0186622)
        CustomJoint hip_l: socket_parent_frame=pelvis_offset socket_child_frame=femur_l_offset
          Coordinate hip_flexion_l: default_value=0 range=(-0.5235988 2.094395) clamped=true
          Coordinate hip_adduction_l: default_value=0 range=(-0.8726646 0.5235988) clamped=true
          Coordinate hip_rotation_l: default_value=0 range=(-0.6981317 0.6981317) clamped=true
          PhysicalOffsetFrame pelvis_offset: socket_parent=/bodyset/pelvis
              translation=(-0.07452599 -0.08365302 -0.07905762)
          PhysicalOffsetFrame femur_l_offset: socket_parent=/bodyset/femur_l translation=(0 0 0)
          SpatialTransform: axes_held_at_zero=(translation1 translation2 translation3)
            TransformAxis rotation1: coordinates=hip_flexion_l axis=(0 0 1) LinearFunction(coefficients=1 0)
            TransformAxis rotation2: coordinates=hip_adduction_l axis=(1 0 0) LinearFunction(coefficients=-1 0)
            TransformAxis rotation3: coordinates=hip_rotation_l axis=(0 1 0) LinearFunction(coefficients=-1 0)
        CustomJoint walker_knee_l: socket_parent_frame=femur_l_offset socket_child_frame=tibia_l_offset
          Coordinate knee_angle_l: default_value=0 range=(0 2.0944) clamped=true
          PhysicalOffsetFrame femur_l_offset: socket_parent=/bodyset/femur_l
              translation=(-0.006911734 -0.3768094 0.002349477) orientation=(1.64157 -1.44618 1.5708)
          PhysicalOffsetFrame tibia_l_offset: socket_parent=/bodyset/tibia_l
              translation=(-0.007825598 -0.004571341 0.0014363) orientation=(1.64157 -1.44618 1.5708)
          SpatialTransform: axes_held_at_zero=translation3
            TransformAxis rotation1: coordinates=knee_angle_l axis=(-1 0 0) LinearFunction(coefficients=1 0)
            TransformAxis rotation2: coordinates=knee_angle_l axis=(0 0 1)
              SimmSpline: x=(0 0.174533 0.349066 0.523599 0.698132 0.872665 1.0472 1.22173 1.39626 1.5708 1.74533 1.91986 2.0944)
                  y=(0 0.0126809 0.0226969 0.0296054 0.0332049 0.0335354 0.0308779 0.0257548 0.0189295 0.011407 0.00443314 -0.00050475 -0.0016782)
            TransformAxis rotation3: coordinates=knee_angle_l axis=(0 1 0)
              SimmSpline: x=(0 0.174533 0.349066 0.523599 0.698132 0.872665 1.0472 1.22173 1.39626 1.5708 1.74533 1.91986 2.0944)
                  y=(0 -0.059461 -0.109399 -0.150618 -0.18392 -0.210107 -0.229983 -0.24435 -0.254012 -0.25977 -0.262428 -0.262788 -0.261654)
            TransformAxis translation1: coordinates=knee_angle_l axis=(0 1 0)
              MultiplierFunction: scale=0.9236422
                SimmSpline: x=(0 0.174533 0.349066 0.523599 0.698132 0.872665 1.0472 1.22173 1.39626 1.5708 1.74533 1.91986 2.0944)
                    y=(0 0.000479 0.000835 0.001086 0.001251 0.001346 0.001391 0.001403 0.0014 0.0014 0.001421 0.001481 0.001599)
            TransformAxis translation2: coordinates=knee_angle_l axis=(0 0 1)
              MultiplierFunction: scale=0.8543552
                SimmSpline: x=(0 0.174533 0.349066 0.523599 0.698132 0.872665 1.0472 1.22173 1.39626 1.5708 1.74533 1.91986 2.0944)
                    y=(0 -0.000988 -0.001899 -0.002734 -0.003492 -0.004173 -0.004777 -0.005305 -0.005756 -0.00613 -0.006427 -0.006648 -0.006792)
        CustomJoint patellofemoral_l: socket_parent_frame=femur_l_offset socket_child_frame=patella_l_offset
          Coordinate knee_angle_l_beta: default_value=0 range=(-99999.9 99999.9) clamped=false
          PhysicalOffsetFrame femur_l_offset: socket_parent=/bodyset/femur_l
              translation=(-0.006911734 -0.3768094 0.002349477)
          PhysicalOffsetFrame patella_l_offset: socket_parent=/bodyset/patella_l translation=(0 0 0)
          SpatialTransform: axes_held_at_zero=(rotation2 rotation3)
            TransformAxis rotation1: coordinates=knee_angle_l_beta axis=(0 0 1)
              SimmSpline: x=(0 0.174533 0.349066 0.523599 0.698132 0.872665 1.0472 1.22173 1.39626 1.5708 1.74533 1.91986 2.0944)
                  y=(0.00113686 -0.00629212 -0.105582 -0.253683 -0.414245 -0.579047 -0.747244 -0.91799 -1.09044 -1.26379 -1.43763 -1.61186 -1.78634)
            TransformAxis translation1: coordinates=knee_angle_l_beta axis=(1 0 0)
              MultiplierFunction: scale=0.8543552
                SimmSpline f23: x=(0 0.174533 0.349066 0.523599 0.698132 0.872665 1.0472 1.22173 1.39626 1.5708 1.74533 1.91986 2.0944)
                    y=(0.0524 0.0488 0.0437 0.0371 0.0296 0.0216 0.0136 0.0057 -0.0019 -0.0088 -0.0148 -0.0196 -0.0227)
            TransformAxis translation2: coordinates=knee_angle_l_beta axis=(0 1 0)
              MultiplierFunction: scale=0.9236422
                SimmSpline f24: x=(0 0.174533 0.349066 0.523599 0.698132 0.872665 1.0472 1.22173 1.39626 1.5708 1.74533 1.91986 2.0944)
                    y=(-0.0108 -0.019 -0.0263 -0.0322 -0.0367 -0.0395 -0.0408 -0.0404 -0.0384 -0.0349 -0.0301 -0.0245 -0.0187)
            TransformAxis translation3: axis=(0 0 1) MultiplierFunction(scale=0.8543552, Constant(value=-0.00275))
        PinJoint ankle_l: socket_parent_frame=tibia_l_offset socket_child_frame=talus_l_offset
          Coordinate ankle_angle_l: default_value=0 range=(-0.4 0.4) clamped=true
          PhysicalOffsetFrame tibia_l_offset: socket_parent=/bodyset/tibia_l translation=(-0.009673726 -0.517295 0)
              orientation=(-0.175895 0.105208 0.0186622)
          PhysicalOffsetFrame talus_l_offset: socket_parent=/bodyset/talus_l translation=(0 0 0)
              orientation=(-0.175895 0.105208 0.0186622)
        WeldJoint mtp_l: socket_parent_frame=calcn_l_offset socket_child_frame=toes_l_offset
          PhysicalOffsetFrame calcn_l_offset: socket_parent=/bodyset/calcn_l
              translation=(0.1821315 -0.002959713 -0.001164463) orientation=(-3.14159 -0.619901 0)
          PhysicalOffsetFrame toes_l_offset: socket_parent=/bodyset/toes_l translation=(0 0 0)
              orientation=(-3.14159 -0.619901 0)
        WeldJoint mtp_r: socket_parent_frame=calcn_r_offset socket_child_frame=toes_r_offset
          PhysicalOffsetFrame calcn_r_offset: socket_parent=/bodyset/calcn_r
              translation=(0.1841171 -0.002991979 0.001291375) orientation=(-3.14159 0.619901 0)
          PhysicalOffsetFrame toes_r_offset: socket_parent=/bodyset/toes_r translation=(0 0 0)
              orientation=(-3.14159 0.619901 0)
        CustomJoint back: socket_parent_frame=pelvis_offset socket_child_frame=torso_offset
          Coordinate lumbar_extension: default_value=0 range=(-1.570796 1.570796) clamped=false
          Coordinate lumbar_bending: default_value=0 range=(-1.570796 1.570796) clamped=false
          Coordinate lumbar_rotation: default_value=0 range=(-1.570796 1.570796) clamped=false
          PhysicalOffsetFrame pelvis_offset: socket_parent=/bodyset/pelvis translation=(-0.133356 0.086861 0)
          PhysicalOffsetFrame torso_offset: socket_parent=/bodyset/torso translation=(0 0 0)
          SpatialTransform: axes_held_at_zero=(translation1 translation2 translation3)
            TransformAxis rotation1: coordinates=lumbar_extension axis=(0 0 1) LinearFunction(coefficients=1 0)
            TransformAxis rotation2: coordinates=lumbar_bending axis=(1 0 0) LinearFunction(coefficients=1 0)
            TransformAxis rotation3: coordinates=lumbar_rotation axis=(0 1 0) LinearFunction(coefficients=1 0)
        WeldJoint subtalar_r: socket_parent_frame=talus_r_offset socket_child_frame=calcn_r_offset
          PhysicalOffsetFrame talus_r_offset: socket_parent=/bodyset/talus_r
              translation=(-0.04509531 -0.07280676 0.009593401) orientation=(-1.76819 0.906223 1.8196)
          PhysicalOffsetFrame calcn_r_offset: socket_parent=/bodyset/calcn_r translation=(0 0 0)
              orientation=(-1.76819 0.906223 1.8196)
        WeldJoint subtalar_l: socket_parent_frame=talus_l_offset socket_child_frame=calcn_l_offset
          PhysicalOffsetFrame talus_l_offset: socket_parent=/bodyset/talus_l
              translation=(-0.04693879 -0.07841465 -0.009985576) orientation=(1.76819 -0.906223 1.8196)
          PhysicalOffsetFrame calcn_l_offset: socket_parent=/bodyset/calcn_l translation=(0 0 0)
              orientation=(1.76819 -0.906223 1.8196)
      ConstraintSet:
        CoordinateCouplerConstraint patellofemoral_knee_angle_r_con: independent_coordinate_names=knee_angle_r
            dependent_coordinate_name=knee_angle_r_beta scale_factor=1
            coupled_coordinates_function=LinearFunction(coefficients=1 0)
        CoordinateCouplerConstraint patellofemoral_knee_angle_l_con: independent_coordinate_names=knee_angle_l
            dependent_coordinate_name=knee_angle_l_beta scale_factor=1
            coupled_coordinates_function=LinearFunction(coefficients=1 0)
      ForceSet:
        CoordinateActuator tau_lumbar_ext: min_control=-1 max_control=1 coordinate=lumbar_extension optimal_force=1000
        CoordinateActuator tau_lumbar_bend: min_control=-1 max_control=1 coordinate=lumbar_bending optimal_force=1000
        CoordinateActuator tau_lumbar_rot: min_control=-1 max_control=1 coordinate=lumbar_rotation optimal_force=1000
        SmoothSphereHalfSpaceForce [values shared by the 12 below unless stated]: appliesForce=false
            socket_half_space=/contactgeometryset/floor stiffness=3067776 [N/m^2] dissipation=2 [s/m]
            static_friction=0.8 dynamic_friction=0.8 viscous_friction=0.5 transition_velocity=0.2 [m/s]
            hertz_smoothing=300 hunt_crossley_smoothing=50
        SmoothSphereHalfSpaceForce contactHeel_r: socket_sphere=/contactgeometryset/heel_r
        SmoothSphereHalfSpaceForce contactMH1_r: socket_sphere=/contactgeometryset/mh1_r
        SmoothSphereHalfSpaceForce contactMH3_r: socket_sphere=/contactgeometryset/mh3_r
        SmoothSphereHalfSpaceForce contactMH5_r: socket_sphere=/contactgeometryset/mh5_r
        SmoothSphereHalfSpaceForce contactHallux_r: socket_sphere=/contactgeometryset/hallux_r
        SmoothSphereHalfSpaceForce contactOtherToes_r: socket_sphere=/contactgeometryset/othertoes_r stiffness=306777.6
        SmoothSphereHalfSpaceForce contactHeel_l: socket_sphere=/contactgeometryset/heel_l
        SmoothSphereHalfSpaceForce contactMH1_l: socket_sphere=/contactgeometryset/mh1_l
        SmoothSphereHalfSpaceForce contactMH3_l: socket_sphere=/contactgeometryset/mh3_l
        SmoothSphereHalfSpaceForce contactMH5_l: socket_sphere=/contactgeometryset/mh5_l
        SmoothSphereHalfSpaceForce contactHallux_l: socket_sphere=/contactgeometryset/hallux_l
        SmoothSphereHalfSpaceForce contactOtherToes_l: socket_sphere=/contactgeometryset/othertoes_l stiffness=306777.6
        Millard2012EquilibriumMuscle [values shared by the 80 below unless stated]: max_contraction_velocity=15
            fiber_damping=0.01 default_activation=0.01 minimum_activation=0.01
          ActiveForceLengthCurve: min_norm_active_fiber_length=0.25 transition_norm_fiber_length=0.77
              max_norm_active_fiber_length=1.9 shallow_ascending_slope=0.75 minimum_value=0
          ForceVelocityCurve: concentric_slope_at_vmax=0 concentric_slope_near_vmax=0.25 isometric_slope=5
              eccentric_slope_at_vmax=0 eccentric_slope_near_vmax=0.15 max_eccentric_velocity_force_multiplier=1.4
          FiberForceLengthCurve: strain_at_zero_force=0 strain_at_one_norm_force=0.7
          TendonForceLengthCurve
        Millard2012EquilibriumMuscle addbrev_r: max_isometric_force=564.3024 optimal_fiber_length=0.1019126
            tendon_slack_length=0.03504201 pennation_angle_at_optimal=0.1147809 [radians] ignore_tendon_compliance=true
          PathPoint P1: pelvis (-0.02529406 -0.1001832 0.0157583)
          PathPoint P2: femur_r (-0.001626287 -0.1140479 0.02024727)
          PathWrap: wrap_object=AB_at_femshaft_r method=hybrid
        Millard2012EquilibriumMuscle addlong_r: max_isometric_force=785.9655 optimal_fiber_length=0.1060053
            tendon_slack_length=0.129126 pennation_angle_at_optimal=0.1377704
          PathPoint P1: pelvis (-0.01003815 -0.09474772 0.01931926)
          PathPoint P2: femur_r (0.009156013 -0.2313526 0.01287203)
          PathWrap: wrap_object=AL_at_femshaft_r method=hybrid
        Millard2012EquilibriumMuscle addmagDist_r: max_isometric_force=517.2011 optimal_fiber_length=0.1678402
            tendon_slack_length=0.08276518 pennation_angle_at_optimal=0.194705 ignore_tendon_compliance=true
          PathPoint P1: pelvis (-0.09805071 -0.1360681 0.04074649)
          PathPoint P2: femur_r (0.009147864 -0.2537084 0.01569367)
          PathWrap: wrap_object=AMdist_at_femshaft_r method=hybrid
        Millard2012EquilibriumMuscle addmagIsch_r: max_isometric_force=508.2579 optimal_fiber_length=0.1493846
            tendon_slack_length=0.2069034 pennation_angle_at_optimal=0.1680443
          PathPoint P1: pelvis (-0.1186834 -0.1382951 0.04268046)
          PathPoint P2: femur_r (0.00391122 -0.3749758 -0.02661415)
          PathWrap: wrap_object=AMisch_at_condyles_r method=hybrid
        Millard2012EquilibriumMuscle addmagMid_r: max_isometric_force=540.7125 optimal_fiber_length=0.1288281
            tendon_slack_length=0.0436235 pennation_angle_at_optimal=0.2073076 ignore_tendon_compliance=true
          PathPoint P1: pelvis (-0.06973733 -0.1286925 0.02920404)
          PathPoint P2: femur_r (0.001967807 -0.1569607 0.02376009)
          PathWrap: wrap_object=AMmid_at_femshaft_r method=hybrid
        Millard2012EquilibriumMuscle addmagProx_r: max_isometric_force=570.0256 optimal_fiber_length=0.1023728
            tendon_slack_length=0.03909179 pennation_angle_at_optimal=0.3114833 ignore_tendon_compliance=true
          PathPoint P1: pelvis (-0.04102665 -0.1146242 0.01396756)
          PathPoint P2: femur_r (-0.01241674 -0.07621884 0.02603689)
          PathWrap: wrap_object=AMprox_at_femshaft_r method=hybrid
        Millard2012EquilibriumMuscle bflh_r: max_isometric_force=1113.486 optimal_fiber_length=0.09586185
            tendon_slack_length=0.3194347 pennation_angle_at_optimal=0.1759182
          PathPoint P1: pelvis (-0.1377269 -0.1269347 0.05996346)
          PathPoint P2: tibia_r (-0.0313201 -0.04202627 0.02351331)
          PathPoint P3: tibia_r (-0.0266732 -0.05463415 0.02816021)
        Millard2012EquilibriumMuscle bfsh_r: max_isometric_force=469.6522 optimal_fiber_length=0.1105924
            tendon_slack_length=0.1060977 pennation_angle_at_optimal=0.2642232 ignore_tendon_compliance=true
          PathPoint P1: femur_r (0.004065718 -0.20403 0.01902756)
          PathPoint P2: tibia_r (-0.02797434 -0.05031145 0.02955428)
          PathWrap: wrap_object=BF_at_gastroc_r method=hybrid
        Millard2012EquilibriumMuscle edl_r: max_isometric_force=507.4324 optimal_fiber_length=0.08250765
            tendon_slack_length=0.4391779 pennation_angle_at_optimal=0.2182582
          PathPoint P1: tibia_r (-0.01487008 -0.1389265 0.01905229)
          PathPoint P2: tibia_r (0.01524183 -0.4514822 0.01040906)
          PathPoint P3: calcn_r (0.09463298 0.05385566 0.0009565723)
          PathPoint P4: calcn_r (0.1664058 0.008227942 0.01554436)
          PathPoint P5: toes_r (0.0003089219 0.007031157 0.0182945)
          PathPoint P6: toes_r (0.04561743 -0.0005983958 0.02989295)
        Millard2012EquilibriumMuscle ehl_r: max_isometric_force=242.2544 optimal_fiber_length=0.08825137
            tendon_slack_length=0.3855632 pennation_angle_at_optimal=0.1972681
          PathPoint P1: tibia_r (-0.01301132 -0.1861163 0.01756528)
          PathPoint P2: tibia_r (0.006598597 -0.3492982 0.01524183)
          PathPoint P3: tibia_r (0.0185876 -0.4434375 -0.002602264)
          PathPoint P4: calcn_r (0.09988456 0.05819402 -0.02522961)
          PathPoint P5: calcn_r (0.1331452 0.04622609 -0.03072997)
          PathPoint P6: calcn_r (0.1785565 0.02079429 -0.03348011)
          PathPoint P7: toes_r (0.03068618 0.00613356 -0.02929506)
          PathPoint P8: toes_r (0.05797432 0.005086369 -0.02224034)
        Millard2012EquilibriumMuscle fdl_r: max_isometric_force=366.4191 optimal_fiber_length=0.05250406
            tendon_slack_length=0.4458994 pennation_angle_at_optimal=0.2248391
          PathPoint P1: tibia_r (-0.002137574 -0.2199777 -0.001672884)
          PathPoint P2: tibia_r (-0.01635709 -0.4376731 -0.01152431)
          PathPoint P3: calcn_r (0.04489662 0.04712372 -0.03348011)
          PathPoint P4: calcn_r (0.07290548 0.02632944 -0.03144739)
          PathPoint P5: calcn_r (0.1707305 -0.01211755 0.01387031)
          PathPoint P6: toes_r (-0.001956507 -0.01166869 0.01757708)
          PathPoint P7: toes_r (0.02934752 -0.01062153 0.02570797)
          PathPoint P8: toes_r (0.04541151 -0.008975946 0.02893639)
        Millard2012EquilibriumMuscle fhl_r: max_isometric_force=787.5281 optimal_fiber_length=0.06119785
            tendon_slack_length=0.4114768 pennation_angle_at_optimal=0.2580255
          PathPoint P1: tibia_r (-0.02881078 -0.2597227 0.0185876)
          PathPoint P2: tibia_r (-0.02249099 -0.4407956 -0.007063287)
          PathPoint P3: calcn_r (0.03851221 0.04128933 -0.02881678)
          PathPoint P4: calcn_r (0.1068873 0.01017276 -0.03061036)
          PathPoint P5: calcn_r (0.1777332 -0.007928746 -0.03216481)
          PathPoint P6: toes_r (0.01596094 -0.009574365 -0.03168653)
          PathPoint P7: toes_r (0.05787127 -0.01525914 -0.02164253)
        Millard2012EquilibriumMuscle gaslat_r: max_isometric_force=1278.789 optimal_fiber_length=0.07101971
            tendon_slack_length=0.4542244 pennation_angle_at_optimal=0.2102268
          PathPoint P1: femur_r (-0.002439431 -0.368626 0.02252408)
          PathPoint P2: calcn_r (0.004530846 0.04637571 -0.006337306)
          PathWrap shank: wrap_object=GasLat_at_shank_r method=hybrid
          PathWrap condyles: wrap_object=Gastroc_at_condyles_r method=hybrid
        Millard2012EquilibriumMuscle gasmed_r: max_isometric_force=2536.729 optimal_fiber_length=0.06118744
            tendon_slack_length=0.4783614 pennation_angle_at_optimal=0.1656816
          PathPoint P1: femur_r (0.006505148 -0.3661128 -0.01691338)
          PathPoint P2: calcn_r (0.004530846 0.04637571 -0.006337306)
          PathWrap shank: wrap_object=GasMed_at_shank_r method=hybrid
          PathWrap condyles: wrap_object=Gastroc_at_condyles_r method=hybrid
        Millard2012EquilibriumMuscle glmax1_r: max_isometric_force=806.7327 optimal_fiber_length=0.157128
            tendon_slack_length=0.05220594 pennation_angle_at_optimal=0.3540118 ignore_tendon_compliance=true
          PathPoint P1: pelvis (-0.1630204 0.03676935 0.05760997)
          PathPoint P2: pelvis (-0.1664636 -0.0257919 0.0797125)
          PathPoint P3: femur_r (-0.03610357 -0.03150816 0.02455693)
          PathPoint P4: femur_r (-0.02252408 -0.05470435 0.03821774)
          PathWrap: wrap_object=Gmax1_at_pelvis_r method=hybrid
        Millard2012EquilibriumMuscle glmax2_r: max_isometric_force=1160.7 optimal_fiber_length=0.1686587
            tendon_slack_length=0.07292841 pennation_angle_at_optimal=0.3673821 ignore_tendon_compliance=true
          PathPoint P1: pelvis (-0.1744096 0.009272281 0.0472749)
          PathPoint P2: pelvis (-0.1779857 -0.06490589 0.0831916)
          PathPoint P3: femur_r (-0.03659146 -0.05644407 0.02049122)
          PathPoint P4: femur_r (-0.01268504 -0.09819721 0.03407071)
          PathWrap: wrap_object=Gmax2_at_pelvis_r method=hybrid
        Millard2012EquilibriumMuscle glmax3_r: max_isometric_force=809.8321 optimal_fiber_length=0.1751629
            tendon_slack_length=0.07312434 pennation_angle_at_optimal=0.3824161 ignore_tendon_compliance=true
          PathPoint P1: pelvis (-0.1721581 -0.05595336 0.009209384)
          PathPoint P2: pelvis (-0.1685831 -0.1346083 0.04451213)
          PathPoint P3: femur_r (-0.02284933 -0.1087322 0.007643549)
          PathPoint P4: femur_r (-0.004878861 -0.1371473 0.0334202)
          PathWrap: wrap_object=Gmax3_at_pelvis_r method=hybrid
        Millard2012EquilibriumMuscle glmed1_r: max_isometric_force=888.7293 optimal_fiber_length=0.07610998
            tendon_slack_length=0.05819477 pennation_angle_at_optimal=0.3165559 ignore_tendon_compliance=true
          PathPoint P1: pelvis (-0.05893108 0.02611164 0.1199266)
          PathPoint P2: femur_r (-0.01772653 -0.01130814 0.04512946)
        Millard2012EquilibriumMuscle glmed2_r: max_isometric_force=637.3683 optimal_fiber_length=0.07478091
            tendon_slack_length=0.06684062 pennation_angle_at_optimal=0.3165559 ignore_tendon_compliance=true
          PathPoint P1: pelvis (-0.1125653 0.03367863 0.06907055)
          PathPoint P2: femur_r (-0.0209791 -0.005605746 0.04285266)
        Millard2012EquilibriumMuscle glmed3_r: max_isometric_force=745.4033 optimal_fiber_length=0.07704616
            tendon_slack_length=0.04773995 pennation_angle_at_optimal=0.3165559 ignore_tendon_compliance=true
          PathPoint P1: pelvis (-0.1525591 -0.007780185 0.05382381)
          PathPoint P2: femur_r (-0.02512613 -0.004542588 0.04212083)
        Millard2012EquilibriumMuscle glmin1_r: max_isometric_force=306.9033 optimal_fiber_length=0.06865233
            tendon_slack_length=0.01629259 pennation_angle_at_optimal=0.1745329 ignore_tendon_compliance=true
          PathPoint P1: pelvis (-0.06144724 -0.01588006 0.1066247)
          PathPoint P2: femur_r (-0.005854633 -0.01005168 0.04553604)
        Millard2012EquilibriumMuscle glmin2_r: max_isometric_force=326.7741 optimal_fiber_length=0.05561852
            tendon_slack_length=0.02592126 pennation_angle_at_optimal=0 ignore_tendon_compliance=true
          PathPoint P1: pelvis (-0.08157651 -0.01513409 0.09935882)
          PathPoint P2: femur_r (-0.007806178 -0.01005168 0.04553604)
        Millard2012EquilibriumMuscle glmin3_r: max_isometric_force=379.6258 optimal_fiber_length=0.03767601
            tendon_slack_length=0.05043875 pennation_angle_at_optimal=0.01745329
          PathPoint P1: pelvis (-0.1044869 -0.01651953 0.08165673)
          PathPoint P2: femur_r (-0.01097744 -0.008022016 0.04472289)
        Millard2012EquilibriumMuscle grac_r: max_isometric_force=239.4141 optimal_fiber_length=0.2256412
            tendon_slack_length=0.1703836 pennation_angle_at_optimal=0.1720016 ignore_tendon_compliance=true
          PathPoint P1: pelvis (-0.06271862 -0.1378269 0.02513143)
          PathPoint P2: tibia_r (-0.01711919 -0.05709574 -0.02751895)
          PathPoint P3: tibia_r (0.001654296 -0.08359628 -0.01461917)
          PathWrap: wrap_object=GR_at_condyles_r method=hybrid
        Millard2012EquilibriumMuscle iliacus_r: max_isometric_force=836.333 optimal_fiber_length=0.1156992
            tendon_slack_length=0.1043254 pennation_angle_at_optimal=0.279914 ignore_tendon_compliance=true
          PathPoint P1: pelvis (-0.08011978 0.03293255 0.08626116)
          PathPoint P2: pelvis (-0.01787794 -0.05936392 0.07735901)
          PathPoint P3: femur_r (-0.00187023 -0.0546077 0.01130269)
          PathPoint P4: femur_r (-0.009920351 -0.06156656 0.01593761)
          PathWrap: wrap_object=IL_at_brim_r method=hybrid range=(2 3)
        Millard2012EquilibriumMuscle perbrev_r: max_isometric_force=429.7546 optimal_fiber_length=0.05671368
            tendon_slack_length=0.1842914 pennation_angle_at_optimal=0.2052361
          PathPoint P1: tibia_r (-0.02258393 -0.3040303 0.02332744)
          PathPoint P2: tibia_r (-0.03150598 -0.4674525 0.02314156)
          PathPoint P3: tibia_r (-0.02648733 -0.4807809 0.02369919)
          PathPoint P4: calcn_r (0.04850066 0.0403917 0.02786022)
          PathPoint P5: calcn_r (0.06971327 0.03276222 0.04101311)
        Millard2012EquilibriumMuscle perlong_r: max_isometric_force=950.2699 optimal_fiber_length=0.06194356
            tendon_slack_length=0.4050972 pennation_angle_at_optimal=0.2479525
          PathPoint P1: tibia_r (-0.0185876 -0.1648634 0.02620851)
          PathPoint P2: tibia_r (-0.02946134 -0.4682927 0.0220263)
          PathPoint P3: tibia_r (-0.02527913 -0.4819817 0.02230512)
          PathPoint P4: calcn_r (0.04510254 0.03440777 0.02642539)
          PathPoint P5: calcn_r (0.0701252 0.01585753 0.03395839)
          PathPoint P6: calcn_r (0.08773368 0.01032238 0.01410945)
          PathPoint P7: calcn_r (0.1238779 0.01271595 -0.0220012)
        Millard2012EquilibriumMuscle piri_r: max_isometric_force=924.6562 optimal_fiber_length=0.02723326
            tendon_slack_length=0.1203566 pennation_angle_at_optimal=0.1745329
          PathPoint P1: pelvis (-0.1348264 -0.006959539 0.01382433)
          PathPoint P2: pelvis (-0.1351041 -0.03267676 0.06233747)
          PathPoint P3: femur_r (-0.01203452 -0.003479429 0.03553437)
        Millard2012EquilibriumMuscle psoas_r: max_isometric_force=1179.35 optimal_fiber_length=0.124651
            tendon_slack_length=0.1061433 pennation_angle_at_optimal=0.2155251 ignore_tendon_compliance=true
          PathPoint P1: pelvis (-0.08025225 0.06607832 0.03990744)
          PathPoint P2: pelvis (-0.02714808 -0.069702 0.06712632)
          PathPoint P3: femur_r (-0.01073349 -0.04513592 0.00374046)
          PathPoint P4: femur_r (-0.01910887 -0.05064502 0.007155663)
          PathWrap: wrap_object=PS_at_brim_r method=hybrid range=(2 3)
        Millard2012EquilibriumMuscle recfem_r: max_isometric_force=1834.136 optimal_fiber_length=0.07565784
            tendon_slack_length=0.4470626 pennation_angle_at_optimal=0.2170149
          PathPoint P1: pelvis (-0.0317831 -0.04135223 0.09547123)
          PathPoint P2: patella_r (0.00966508 0.04735889 0.0006765556)
          PathPoint P3: patella_r (0.01169475 0.0422364 -0.000966508)
          PathPoint P4: patella_r (0.00483254 0.002387275 2.899524e-5)
          PathPoint P5: tibia_r (0.03029779 -0.0757914 -0.0004368086)
          PathWrap: wrap_object=KnExt_at_fem_r method=hybrid
        Millard2012EquilibriumMuscle sart_r: max_isometric_force=212.659 optimal_fiber_length=0.4031467
            tendon_slack_length=0.124045 pennation_angle_at_optimal=0.02613542 ignore_tendon_compliance=true
          PathPoint P1: pelvis (-0.02582372 -0.01662614 0.108057)
          PathPoint P2: femur_r (-0.002439431 -0.3448497 -0.03423334)
          PathPoint P3: tibia_r (-0.02332744 -0.0481501 -0.03392237)
          PathPoint P4: tibia_r (-0.01477714 -0.07192496 -0.02453563)
          PathPoint P5: tibia_r (0.01263957 -0.0972608 -0.002416388)
        Millard2012EquilibriumMuscle semimem_r: max_isometric_force=1852.597 optimal_fiber_length=0.06793124
            tendon_slack_length=0.3422021 pennation_angle_at_optimal=0.2545615
          PathPoint P1: pelvis (-0.1307077 -0.1214987 0.06282861)
          PathPoint P2: tibia_r (-0.02695202 -0.0500713 -0.01821585)
          PathWrap: wrap_object=SM_at_condyles_r method=hybrid
        Millard2012EquilibriumMuscle semiten_r: max_isometric_force=503.9387 optimal_fiber_length=0.191556
            tendon_slack_length=0.2453495 pennation_angle_at_optimal=0.241295
          PathPoint P1: pelvis (-0.137462 -0.1335422 0.05269822)
          PathPoint P2: tibia_r (-0.02899665 -0.06099813 -0.0212828)
          PathPoint P3: tibia_r (0.001765822 -0.09281802 -0.01087375)
          PathWrap: wrap_object=ST_at_condyles_r method=hybrid
        Millard2012EquilibriumMuscle soleus_r: max_isometric_force=4977.316 optimal_fiber_length=0.0543923
            tendon_slack_length=0.3421225 pennation_angle_at_optimal=0.3814289
          PathPoint P1: tibia_r (-0.007063287 -0.1099883 0.009107923)
          PathPoint P2: calcn_r (0.004530846 0.04637571 -0.006337306)
        Millard2012EquilibriumMuscle tfl_r: max_isometric_force=343.224 optimal_fiber_length=0.09498703
            tendon_slack_length=0.255137 pennation_angle_at_optimal=0.05235988
          PathPoint P1: pelvis (-0.04118561 0.02280769 0.1269873)
          PathPoint P2: femur_r (0.02390642 -0.09616755 0.04854467)
          PathPoint P3: femur_r (0.008700636 -0.3914357 0.02634585)
          PathPoint P4: tibia_r (0.0100373 -0.04923077 0.03215655)
        Millard2012EquilibriumMuscle tibant_r: max_isometric_force=993.0498 optimal_fiber_length=0.08542064
            tendon_slack_length=0.300737 pennation_angle_at_optimal=0.1951828
          PathPoint P1: tibia_r (0.01431245 -0.1575387 0.01505595)
          PathPoint P2: tibia_r (0.02332744 -0.2288626 0.01189606)
          PathPoint P3: tibia_r (0.02165455 -0.4393545 -0.01226781)
          PathPoint P4: calcn_r (0.1200676 0.02662859 -0.03646939)
        Millard2012EquilibriumMuscle tibpost_r: max_isometric_force=1412.528 optimal_fiber_length=0.04652021
            tendon_slack_length=0.3455536 pennation_angle_at_optimal=0.2264891
          PathPoint P1: tibia_r (-0.003810458 -0.1565783 0.009572613)
          PathPoint P2: tibia_r (-0.01524183 -0.4388738 -0.01626415)
          PathPoint P3: calcn_r (0.04294011 0.04996606 -0.03419753)
          PathPoint P4: calcn_r (0.07949581 0.02378625 -0.03359964)
        Millard2012EquilibriumMuscle vasint_r: max_isometric_force=1425.304 optimal_fiber_length=0.09986043
            tendon_slack_length=0.2033519 pennation_angle_at_optimal=0.06309973
          PathPoint P1: femur_r (0.02358116 -0.1859559 0.02520745)
          PathPoint P2: femur_r (0.02724031 -0.2014201 0.02317459)
          PathPoint P3: patella_r (0.005605746 0.04639238 -0.0005799048)
          PathPoint P4: patella_r (0.00483254 0.002387275 -0.0003769381)
          PathPoint P5: tibia_r (0.03026988 -0.07588744 0.0003996334)
          PathWrap: wrap_object=KnExt_at_fem_r method=hybrid
        Millard2012EquilibriumMuscle vaslat_r: max_isometric_force=4348.034 optimal_fiber_length=0.09923199
            tendon_slack_length=0.2202284 pennation_angle_at_optimal=0.2528673
          PathPoint P1: femur_r (0.003903089 -0.1791904 0.02837871)
          PathPoint P2: femur_r (0.02187356 -0.2504224 0.03325757)
          PathPoint P3: patella_r (0.009955032 0.04088329 0.01362776)
          PathPoint P4: patella_r (0.00483254 0.002387275 0.007084504)
          PathPoint P5: tibia_r (0.03024206 -0.07610355 0.004749131)
          PathWrap: wrap_object=KnExt_at_fem_r method=hybrid
        Millard2012EquilibriumMuscle vasmed_r: max_isometric_force=2312.502 optimal_fiber_length=0.09727307
            tendon_slack_length=0.2008812 pennation_angle_at_optimal=0.4222225
          PathPoint P1: femur_r (0.01138401 -0.2028698 0.0152871)
          PathPoint P2: femur_r (0.02894791 -0.2676259 0.0007318292)
          PathPoint P3: patella_r (0.006089 0.04300961 -0.01643064)
          PathPoint P4: patella_r (0.00483254 0.002387275 -0.008215318)
          PathPoint P5: tibia_r (0.02964722 -0.07633168 -0.006301196)
          PathWrap: wrap_object=KnExt_at_fem_r method=hybrid
        Millard2012EquilibriumMuscle addbrev_l: max_isometric_force=576.0826 optimal_fiber_length=0.0998286
            tendon_slack_length=0.03432544 pennation_angle_at_optimal=0.1147809 ignore_tendon_compliance=true
          PathPoint P1: pelvis (-0.02529406 -0.1001832 -0.0157583)
          PathPoint P2: femur_l (-0.00170871 -0.1089898 -0.02127344)
          PathWrap: wrap_object=AB_at_femshaft_l method=hybrid
        Millard2012EquilibriumMuscle addlong_l: max_isometric_force=817.8746 optimal_fiber_length=0.1018696
            tendon_slack_length=0.1240882 pennation_angle_at_optimal=0.1377704
          PathPoint P1: pelvis (-0.01003815 -0.09474772 -0.01931926)
          PathPoint P2: femur_l (0.009620057 -0.2210918 -0.01352441)
          PathWrap: wrap_object=AL_at_femshaft_l method=hybrid
        Millard2012EquilibriumMuscle addmagDist_l: max_isometric_force=544.1033 optimal_fiber_length=0.1595416
            tendon_slack_length=0.07867301 pennation_angle_at_optimal=0.194705 ignore_tendon_compliance=true
          PathPoint P1: pelvis (-0.09805071 -0.1360681 -0.04074649)
          PathPoint P2: femur_l (0.009611496 -0.2424561 -0.01648906)
          PathWrap: wrap_object=AMdist_at_femshaft_l method=hybrid
        Millard2012EquilibriumMuscle addmagIsch_l: max_isometric_force=535.4209 optimal_fiber_length=0.141806
            tendon_slack_length=0.1964068 pennation_angle_at_optimal=0.1680443
          PathPoint P1: pelvis (-0.1186834 -0.1382951 -0.04268046)
          PathPoint P2: femur_l (0.004109449 -0.3583452 0.02796301)
          PathWrap: wrap_object=AMisch_at_condyles_l method=hybrid
        Millard2012EquilibriumMuscle addmagMid_l: max_isometric_force=561.9212 optimal_fiber_length=0.1239657
            tendon_slack_length=0.04197701 pennation_angle_at_optimal=0.2073076 ignore_tendon_compliance=true
          PathPoint P1: pelvis (-0.06973733 -0.1286925 -0.02920404)
          PathPoint P2: femur_l (0.00206754 -0.1499993 -0.02496429)
          PathWrap: wrap_object=AMmid_at_femshaft_l method=hybrid
        Millard2012EquilibriumMuscle addmagProx_l: max_isometric_force=569.5411 optimal_fiber_length=0.1024599
            tendon_slack_length=0.03912504 pennation_angle_at_optimal=0.3114833 ignore_tendon_compliance=true
          PathPoint P1: pelvis (-0.04102665 -0.1146242 -0.01396756)
          PathPoint P2: femur_l (-0.01304604 -0.07283844 -0.02735649)
          PathWrap: wrap_object=AMprox_at_femshaft_l method=hybrid
        Millard2012EquilibriumMuscle bflh_l: max_isometric_force=1151.611 optimal_fiber_length=0.09268828
            tendon_slack_length=0.3088596 pennation_angle_at_optimal=0.1759182
          PathPoint P1: pelvis (-0.1377269 -0.1269347 -0.05996346)
          PathPoint P2: tibia_l (-0.03260046 -0.04526331 -0.02447453)
          PathPoint P3: tibia_l (-0.02776359 -0.0588423 -0.02931139)
        Millard2012EquilibriumMuscle bfsh_l: max_isometric_force=478.9857 optimal_fiber_length=0.1084374
            tendon_slack_length=0.1040303 pennation_angle_at_optimal=0.2642232 ignore_tendon_compliance=true
          PathPoint P1: femur_l (0.004271776 -0.1949811 -0.01999191)
          PathPoint P2: tibia_l (-0.02911792 -0.05418665 -0.03076245)
          PathWrap: wrap_object=BF_at_gastroc_l method=hybrid
        Millard2012EquilibriumMuscle edl_l: max_isometric_force=481.513 optimal_fiber_length=0.08694897
            tendon_slack_length=0.4628185 pennation_angle_at_optimal=0.2182582
          PathPoint P1: tibia_l (-0.01547796 -0.1496272 -0.01983114)
          PathPoint P2: tibia_l (0.01586491 -0.4862573 -0.01083457)
          PathPoint P3: calcn_l (0.09361245 0.05327487 -0.0008625639)
          PathPoint P4: calcn_l (0.1646113 0.008139211 -0.01401672)
          PathPoint P5: toes_l (0.0003055904 0.006955333 -0.01649658)
          PathPoint P6: toes_l (0.04512549 -0.0005919426 -0.02695518)
        Millard2012EquilibriumMuscle ehl_l: max_isometric_force=230.7353 optimal_fiber_length=0.09265717
            tendon_slack_length=0.4048118 pennation_angle_at_optimal=0.1972681
          PathPoint P1: tibia_l (-0.01354322 -0.2004518 -0.01828334)
          PathPoint P2: tibia_l (0.006868346 -0.3762027 -0.01586491)
          PathPoint P3: tibia_l (0.01934745 -0.4775929 0.002708643)
          PathPoint P4: calcn_l (0.0988074 0.05756645 0.02275014)
          PathPoint P5: calcn_l (0.1317093 0.04572758 0.02770994)
          PathPoint P6: calcn_l (0.176631 0.02057004 0.03018981)
          PathPoint P7: toes_l (0.03035526 0.006067416 0.02641605)
          PathPoint P8: toes_l (0.05734912 0.005031518 0.02005464)
        Millard2012EquilibriumMuscle fdl_l: max_isometric_force=351.5436 optimal_fiber_length=0.05472576
            tendon_slack_length=0.4647675 pennation_angle_at_optimal=0.2248391
          PathPoint P1: tibia_l (-0.002224957 -0.2369213 0.001741271)
          PathPoint P2: tibia_l (-0.01702576 -0.4713845 0.01199542)
          PathPoint P3: calcn_l (0.04441245 0.04661554 0.03018981)
          PathPoint P4: calcn_l (0.07211926 0.0260455 0.02835685)
          PathPoint P5: calcn_l (0.1688893 -0.01198688 -0.01250718)
          PathPoint P6: toes_l (-0.001935408 -0.01154286 -0.01584967)
          PathPoint P7: toes_l (0.02903103 -0.01050699 -0.02318149)
          PathPoint P8: toes_l (0.04492179 -0.008879149 -0.02609263)
        Millard2012EquilibriumMuscle fhl_l: max_isometric_force=755.6835 optimal_fiber_length=0.06377673
            tendon_slack_length=0.4288164 pennation_angle_at_optimal=0.2580255
          PathPoint P1: tibia_l (-0.02998855 -0.2797276 -0.01934745)
          PathPoint P2: tibia_l (-0.02341042 -0.4747476 0.007352032)
          PathPoint P3: calcn_l (0.03809689 0.04084406 0.02598477)
          PathPoint P4: calcn_l (0.1057346 0.01006305 0.02760209)
          PathPoint P5: calcn_l (0.1758165 -0.007843242 0.02900377)
          PathPoint P6: toes_l (0.01578881 -0.009471114 0.02857249)
          PathPoint P7: toes_l (0.05724718 -0.01509458 0.01951558)
        Millard2012EquilibriumMuscle gaslat_l: max_isometric_force=1185.482 optimal_fiber_length=0.0766095
            tendon_slack_length=0.4899753 pennation_angle_at_optimal=0.2102268
          PathPoint P1: femur_l (-0.002563066 -0.3522769 -0.02366564)
          PathPoint P2: calcn_l (0.004481985 0.04587559 0.005714498)
          PathWrap shank: wrap_object=GasLat_at_shank_l method=hybrid
          PathWrap condyles: wrap_object=Gastroc_at_condyles_l method=hybrid
        Millard2012EquilibriumMuscle gasmed_l: max_isometric_force=2352.579 optimal_fiber_length=0.06597695
            tendon_slack_length=0.5158056 pennation_angle_at_optimal=0.1656816
          PathPoint P1: femur_l (0.006834842 -0.3498753 0.01777059)
          PathPoint P2: calcn_l (0.004481985 0.04587559 0.005714498)
          PathWrap shank: wrap_object=GasMed_at_shank_l method=hybrid
          PathWrap condyles: wrap_object=Gastroc_at_condyles_l method=hybrid
        Millard2012EquilibriumMuscle glmax1_l: max_isometric_force=814.4704 optimal_fiber_length=0.1556353
            tendon_slack_length=0.05170996 pennation_angle_at_optimal=0.3540118 ignore_tendon_compliance=true
          PathPoint P1: pelvis (-0.1630204 0.03676935 -0.05760997)
          PathPoint P2: pelvis (-0.1664636 -0.0257919 -0.0797125)
          PathPoint P3: femur_l (-0.03793337 -0.03011074 -0.02580153)
          PathPoint P4: femur_l (-0.02366564 -0.05227815 -0.04015469)
          PathWrap: wrap_object=Gmax1_at_pelvis_l method=hybrid
        Millard2012EquilibriumMuscle glmax2_l: max_isometric_force=1179.179 optimal_fiber_length=0.1660157
            tendon_slack_length=0.07178554 pennation_angle_at_optimal=0.3673821 ignore_tendon_compliance=true
          PathPoint P1: pelvis (-0.1744096 0.009272281 -0.0472749)
          PathPoint P2: pelvis (-0.1779857 -0.06490589 -0.0831916)
          PathPoint P3: femur_l (-0.03844598 -0.05394071 -0.02152975)
          PathPoint P4: femur_l (-0.01332794 -0.09384205 -0.03579748)
          PathWrap: wrap_object=Gmax2_at_pelvis_l method=hybrid
        Millard2012EquilibriumMuscle glmax3_l: max_isometric_force=820.4288 optimal_fiber_length=0.1729005
            tendon_slack_length=0.07217987 pennation_angle_at_optimal=0.3824161 ignore_tendon_compliance=true
          PathPoint P1: pelvis (-0.1721581 -0.05595336 -0.009209384)
          PathPoint P2: pelvis (-0.1685831 -0.1346083 -0.04451213)
          PathPoint P3: femur_l (-0.02400738 -0.1039097 -0.008030939)
          PathPoint P4: femur_l (-0.005126131 -0.1310646 -0.035114)
          PathWrap: wrap_object=Gmax3_at_pelvis_l method=hybrid
        Millard2012EquilibriumMuscle glmed1_l: max_isometric_force=889.7384 optimal_fiber_length=0.07602366
            tendon_slack_length=0.05812876 pennation_angle_at_optimal=0.3165559 ignore_tendon_compliance=true
          PathPoint P1: pelvis (-0.05893108 0.02611164 -0.1199266)
          PathPoint P2: femur_l (-0.01862494 -0.01080661 -0.04741671)
        Millard2012EquilibriumMuscle glmed2_l: max_isometric_force=634.9647 optimal_fiber_length=0.07506398
            tendon_slack_length=0.06709363 pennation_angle_at_optimal=0.3165559 ignore_tendon_compliance=true
          PathPoint P1: pelvis (-0.1125653 0.03367863 -0.06907055)
          PathPoint P2: femur_l (-0.02204236 -0.005357125 -0.04502452)
        Millard2012EquilibriumMuscle glmed3_l: max_isometric_force=742.007 optimal_fiber_length=0.07739881
            tendon_slack_length=0.04795847 pennation_angle_at_optimal=0.3165559 ignore_tendon_compliance=true
          PathPoint P1: pelvis (-0.1525591 -0.007780185 -0.05382381)
          PathPoint P2: femur_l (-0.02639958 -0.004341118 -0.0442556)
        Millard2012EquilibriumMuscle glmin1_l: max_isometric_force=306.2134 optimal_fiber_length=0.06880702
            tendon_slack_length=0.01632931 pennation_angle_at_optimal=0.1745329 ignore_tendon_compliance=true
          PathPoint P1: pelvis (-0.06144724 -0.01588006 -0.1066247)
          PathPoint P2: femur_l (-0.006151357 -0.009605879 -0.04784389)
        Millard2012EquilibriumMuscle glmin2_l: max_isometric_force=325.5171 optimal_fiber_length=0.0558333
            tendon_slack_length=0.02602136 pennation_angle_at_optimal=0 ignore_tendon_compliance=true
          PathPoint P1: pelvis (-0.08157651 -0.01513409 -0.09935882)
          PathPoint P2: femur_l (-0.00820181 -0.009605879 -0.04784389)
        Millard2012EquilibriumMuscle glmin3_l: max_isometric_force=376.6867 optimal_fiber_length=0.03796998
            tendon_slack_length=0.05083231 pennation_angle_at_optimal=0.01745329
          PathPoint P1: pelvis (-0.1044869 -0.01651953 -0.08165673)
          PathPoint P2: femur_l (-0.0115338 -0.00766623 -0.04698954)
        Millard2012EquilibriumMuscle grac_l: max_isometric_force=245.3895 optimal_fiber_length=0.2201467
            tendon_slack_length=0.1662347 pennation_angle_at_optimal=0.1720016 ignore_tendon_compliance=true
          PathPoint P1: pelvis (-0.06271862 -0.1378269 -0.02513143)
          PathPoint P2: tibia_l (-0.01781902 -0.0614935 0.02864391)
          PathPoint P3: tibia_l (0.001721923 -0.09003522 0.0152168)
          PathWrap: wrap_object=GR_at_condyles_l method=hybrid
        Millard2012EquilibriumMuscle iliacus_l: max_isometric_force=840.4706 optimal_fiber_length=0.1151297
            tendon_slack_length=0.1038119 pennation_angle_at_optimal=0.279914 ignore_tendon_compliance=true
          PathPoint P1: pelvis (-0.08011978 0.03293255 -0.08626116)
          PathPoint P2: pelvis (-0.01787794 -0.05936392 -0.07735901)
          PathPoint P3: femur_l (-0.001965017 -0.05218579 -0.01187554)
          PathPoint P4: femur_l (-0.01042313 -0.05883601 -0.01674536)
          PathWrap: wrap_object=IL_at_brim_l method=hybrid range=(2 3)
        Millard2012EquilibriumMuscle perbrev_l: max_isometric_force=403.2952 optimal_fiber_length=0.06043455
            tendon_slack_length=0.1963824 pennation_angle_at_optimal=0.2052361
          PathPoint P1: tibia_l (-0.02350715 -0.327448 -0.02428105)
          PathPoint P2: tibia_l (-0.03279393 -0.5034577 -0.02408758)
          PathPoint P3: tibia_l (-0.02757012 -0.5178127 -0.024668)
          PathPoint P4: calcn_l (0.04797763 0.03995611 -0.02512222)
          PathPoint P5: calcn_l (0.06896148 0.03240891 -0.03698249)
        Millard2012EquilibriumMuscle perlong_l: max_isometric_force=905.1073 optimal_fiber_length=0.06503439
            tendon_slack_length=0.4253105 pennation_angle_at_optimal=0.2479525
          PathPoint P1: tibia_l (-0.01934745 -0.1775618 -0.02727991)
          PathPoint P2: tibia_l (-0.03066571 -0.5043626 -0.02292673)
          PathPoint P3: tibia_l (-0.02631254 -0.519106 -0.02321694)
          PathPoint P4: calcn_l (0.04461615 0.03403672 -0.0238284)
          PathPoint P5: calcn_l (0.06936897 0.01568652 -0.03062108)
          PathPoint P6: calcn_l (0.08678755 0.01021106 -0.01272282)
          PathPoint P7: calcn_l (0.122542 0.01257882 0.019839)
        Millard2012EquilibriumMuscle piri_l: max_isometric_force=920.5633 optimal_fiber_length=0.02735434
            tendon_slack_length=0.1208917 pennation_angle_at_optimal=0.1745329
          PathPoint P1: pelvis (-0.1348264 -0.006959539 -0.01382433)
          PathPoint P2: pelvis (-0.1351041 -0.03267676 -0.06233747)
          PathPoint P3: femur_l (-0.01264446 -0.003325112 -0.03733532)
        Millard2012EquilibriumMuscle psoas_l: max_isometric_force=1181.468 optimal_fiber_length=0.1244275
            tendon_slack_length=0.105953 pennation_angle_at_optimal=0.2155251 ignore_tendon_compliance=true
          PathPoint P1: pelvis (-0.08025225 0.06607832 -0.03990744)
          PathPoint P2: pelvis (-0.02714808 -0.069702 -0.06712632)
          PathPoint P3: femur_l (-0.01127749 -0.04313409 -0.003930034)
          PathPoint P4: femur_l (-0.02007735 -0.04839885 -0.007518326)
          PathWrap: wrap_object=PS_at_brim_l method=hybrid range=(2 3)
        Millard2012EquilibriumMuscle recfem_l: max_isometric_force=1878.324 optimal_fiber_length=0.07387799
            tendon_slack_length=0.4365455 pennation_angle_at_optimal=0.2170149
          PathPoint P1: pelvis (-0.0317831 -0.04135223 -0.09547123)
          PathPoint P2: patella_l (0.009236422 0.04525847 -0.0006465496)
          PathPoint P3: patella_l (0.01117607 0.04036316 0.0009236422)
          PathPoint P4: patella_l (0.004618211 0.002281396 -2.770927e-5)
          PathPoint P5: tibia_l (0.03153635 -0.08162917 0.0004546651)
          PathWrap: wrap_object=KnExt_at_fem_l method=hybrid
        Millard2012EquilibriumMuscle sart_l: max_isometric_force=216.0473 optimal_fiber_length=0.3968242
            tendon_slack_length=0.1220996 pennation_angle_at_optimal=0.02613542 ignore_tendon_compliance=true
          PathPoint P1: pelvis (-0.02582372 -0.01662614 -0.108057)
          PathPoint P2: femur_l (-0.002563066 -0.3295552 0.03596835)
          PathPoint P3: tibia_l (-0.02428105 -0.05185882 0.0353091)
          PathPoint P4: tibia_l (-0.01538122 -0.07746492 0.02553864)
          PathPoint P5: tibia_l (0.01315627 -0.1047522 0.002515169)
        Millard2012EquilibriumMuscle semimem_l: max_isometric_force=1917.223 optimal_fiber_length=0.06564141
            tendon_slack_length=0.3306671 pennation_angle_at_optimal=0.2545615
          PathPoint P1: pelvis (-0.1307077 -0.1214987 -0.06282861)
          PathPoint P2: tibia_l (-0.02805381 -0.053928 0.0189605)
          PathWrap: wrap_object=SM_at_condyles_l method=hybrid
        Millard2012EquilibriumMuscle semiten_l: max_isometric_force=515.5121 optimal_fiber_length=0.1872555
            tendon_slack_length=0.2398413 pennation_angle_at_optimal=0.241295
          PathPoint P1: pelvis (-0.137462 -0.1335422 -0.05269822)
          PathPoint P2: tibia_l (-0.03018203 -0.06569646 0.02215283)
          PathPoint P3: tibia_l (0.001838008 -0.09996726 0.01131826)
          PathWrap: wrap_object=ST_at_condyles_l method=hybrid
        Millard2012EquilibriumMuscle soleus_l: max_isometric_force=4579.842 optimal_fiber_length=0.05911289
            tendon_slack_length=0.3718145 pennation_angle_at_optimal=0.3814289
          PathPoint P1: tibia_l (-0.007352032 -0.1184601 -0.009480252)
          PathPoint P2: calcn_l (0.004481985 0.04587559 0.005714498)
        Millard2012EquilibriumMuscle tfl_l: max_isometric_force=352.1579 optimal_fiber_length=0.0925773
            tendon_slack_length=0.2486644 pennation_angle_at_optimal=0.05235988
          PathPoint P1: pelvis (-0.04118561 0.02280769 -0.1269873)
          PathPoint P2: femur_l (0.02511804 -0.0919024 -0.05100501)
          PathPoint P3: femur_l (0.009141601 -0.3740751 -0.02768111)
          PathPoint P4: tibia_l (0.01044762 -0.05302274 -0.03347109)
        Millard2012EquilibriumMuscle tibant_l: max_isometric_force=926.3964 optimal_fiber_length=0.09156659
            tendon_slack_length=0.3223748 pennation_angle_at_optimal=0.1951828
          PathPoint P1: tibia_l (0.01489754 -0.169673 -0.01567144)
          PathPoint P2: tibia_l (0.02428105 -0.2464906 -0.01238237)
          PathPoint P3: tibia_l (0.02253978 -0.4731955 0.01276932)
          PathPoint P4: calcn_l (0.1187728 0.02634142 0.03288531)
        Millard2012EquilibriumMuscle tibpost_l: max_isometric_force=1312.243 optimal_fiber_length=0.0500754
            tendon_slack_length=0.3719617 pennation_angle_at_optimal=0.2264891
          PathPoint P1: tibia_l (-0.003966228 -0.1686386 -0.009963938)
          PathPoint P2: tibia_l (-0.01586491 -0.4726777 0.01692902)
          PathPoint P3: calcn_l (0.04247704 0.04942723 0.03083672)
          PathPoint P4: calcn_l (0.07863852 0.02352973 0.03029759)
        Millard2012EquilibriumMuscle vasint_l: max_isometric_force=1442.23 optimal_fiber_length=0.09868845
            tendon_slack_length=0.2009653 pennation_angle_at_optimal=0.06309973
          PathPoint P1: femur_l (0.0247763 -0.1777086 -0.02648501)
          PathPoint P2: femur_l (0.0286209 -0.1924868 -0.02434912)
          PathPoint P3: patella_l (0.005357125 0.04433483 0.0005541853)
          PathPoint P4: patella_l (0.004618211 0.002281396 0.0003602205)
          PathPoint P5: tibia_l (0.0315073 -0.08173261 -0.0004159702)
          PathWrap: wrap_object=KnExt_at_fem_l method=hybrid
        Millard2012EquilibriumMuscle vaslat_l: max_isometric_force=4393.356 optimal_fiber_length=0.0982083
            tendon_slack_length=0.2179565 pennation_angle_at_optimal=0.2528673
          PathPoint P1: femur_l (0.004100905 -0.1712431 -0.029817)
          PathPoint P2: femur_l (0.02298215 -0.2393159 -0.03494313)
          PathPoint P3: patella_l (0.009513515 0.03907007 -0.01302336)
          PathPoint P4: patella_l (0.004618211 0.002281396 -0.006770297)
          PathPoint P5: tibia_l (0.03147834 -0.08196537 -0.004943274)
          PathWrap: wrap_object=KnExt_at_fem_l method=hybrid
        Millard2012EquilibriumMuscle vasmed_l: max_isometric_force=2333.221 optimal_fiber_length=0.09640928
            tendon_slack_length=0.1990974 pennation_angle_at_optimal=0.4222225
          PathPoint P1: femur_l (0.01196097 -0.1938723 -0.01606188)
          PathPoint P2: femur_l (0.03041505 -0.2557563 -0.0007689197)
          PathPoint P3: patella_l (0.005818946 0.04110208 0.01570192)
          PathPoint P4: patella_l (0.004618211 0.002281396 0.007850959)
          PathPoint P5: tibia_l (0.03085919 -0.08221107 0.006558786)
          PathWrap: wrap_object=KnExt_at_fem_l method=hybrid
      MarkerSet:
        Marker C7: torso (-0.06651514 0.4606033 -6.636172e-9) fixed=true
        Marker T10: torso (-0.09969991 0.1645979 -0.009520384) fixed=true
        Marker CLAV: torso (0.04699841 0.3784735 0.0009735321) fixed=true
        Marker STRN: torso (0.1025275 0.204568 -0.002098622) fixed=true
        Marker RACR: torso (-0.01698966 0.4323142 0.1463218) fixed=true
        Marker LACR: torso (-0.01511015 0.4342952 -0.1420658) fixed=true
        Marker RASI: pelvis (0.01086179 0.01175906 0.1102704) fixed=true
        Marker LASI: pelvis (0.01138517 0.01180013 -0.1101234) fixed=true
        Marker RPSI: pelvis (-0.1813224 0.04172431 0.03859357) fixed=true
        Marker LPSI: pelvis (-0.1713516 0.043162 -0.04024057) fixed=true
        Marker RTH1: femur_r (0.0034741 -0.1127616 0.08627809)
        Marker RTH2: femur_r (0.07057398 -0.1973321 0.07049301)
        Marker RTH3: femur_r (0.01130354 -0.2621688 0.07520932)
        Marker RLFC: femur_r (-0.001702721 -0.4043292 0.05667203) fixed=true
        Marker RMFC: femur_r (-0.004125447 -0.4066991 -0.04830879) fixed=true
        Marker RTB3: tibia_r (0.02614162 -0.2511408 -0.001762716)
        Marker RTB2: tibia_r (0.009981896 -0.1798377 0.04512629)
        Marker RTB1: tibia_r (0.02282667 -0.1195776 -0.005964621)
        Marker RLMAL: tibia_r (-0.004044299 -0.4319598 0.05095817) fixed=true
        Marker RMMAL: tibia_r (0.004580622 -0.4102094 -0.03489793) fixed=true
        Marker RCAL: calcn_r (-0.03118026 -0.01029103 -0.00582245) fixed=true
        Marker RMT5: calcn_r (0.1683281 0.01048182 0.05332043)
        Marker RMT1: calcn_r (0.1912945 0.0105237 -0.03850603)
        Marker LTH1: femur_l (0.01519807 -0.10143 -0.08792804)
        Marker LTH2: femur_l (0.07020035 -0.1791818 -0.0824039)
        Marker LTH3: femur_l (0.01324322 -0.2431406 -0.08079489)
        Marker LLFC: femur_l (0.0004747861 -0.3985188 -0.06062783) fixed=true
        Marker LMFC: femur_l (-0.002649803 -0.3893682 0.05088381) fixed=true
        Marker LTB3: tibia_l (0.03277053 -0.2586768 0.003884662)
        Marker LTB2: tibia_l (0.03555427 -0.1841248 -0.04964196)
        Marker LTB1: tibia_l (0.02579745 -0.1229926 0.002569557)
        Marker LLMAL: tibia_l (-0.01262889 -0.4376072 -0.04462206) fixed=true
        Marker LMMAL: tibia_l (0.00621214 -0.4394013 0.04043096) fixed=true
        Marker LCAL: calcn_l (-0.03241898 -0.006857244 0.001665476) fixed=true
        Marker LMT5: calcn_l (0.1737082 0.005679336 -0.0511795)
        Marker LMT1: calcn_l (0.1889937 0.01423247 0.03658635)
      ContactGeometrySet:
        ContactSphere heel_r: socket_frame=/bodyset/calcn_r location=(0.03000293 0.01597616 0) radius=0.03900049
        ContactSphere mh1_r: socket_frame=/bodyset/calcn_r location=(0.1891651 -0.007296367 -0.02954306)
            radius=0.01906691
        ContactSphere mh3_r: socket_frame=/bodyset/calcn_r location=(0.1756533 -0.007296367 0.0102203)
            radius=0.01906691
        ContactSphere mh5_r: socket_frame=/bodyset/calcn_r location=(0.1486297 -0.007296367 0.04231843)
            radius=0.01906691
        ContactSphere hallux_r: socket_frame=/bodyset/toes_r location=(0.05224559 -0.009188017 -0.02155845)
            radius=0.01906691
        ContactSphere othertoes_r: socket_frame=/bodyset/toes_r location=(0.05044402 -0.005404716 0.03074075)
            radius=0.01906691
        ContactSphere heel_l: socket_frame=/bodyset/calcn_l location=(0.02967938 0.01580387 0) radius=0.03753203
        ContactSphere mh1_l: socket_frame=/bodyset/calcn_l location=(0.1871251 -0.007217683 0.02663967)
            radius=0.01834899
        ContactSphere mh3_l: socket_frame=/bodyset/calcn_l location=(0.173759 -0.007217683 -0.009215885)
            radius=0.01834899
        ContactSphere mh5_l: socket_frame=/bodyset/calcn_l location=(0.1470269 -0.007217683 -0.03815952)
            radius=0.01834899
        ContactSphere hallux_l: socket_frame=/bodyset/toes_l location=(0.05168218 -0.009088934 0.01943976)
            radius=0.01834899
        ContactSphere othertoes_l: socket_frame=/bodyset/toes_l location=(0.04990003 -0.005346432 -0.02771965)
            radius=0.01834899
        ContactHalfSpace floor: socket_frame=/ground orientation=(0 0 -1.570796)
  TableProcessor kinematics: filepath=G:\+GitRepos+\predictive-gait-sims-pfjloading-mtlb\ExpData\Gait\coordinates.sto
