# OpenSim document version 40000
MocoStudy gaitTracking_withFrameDistance_fromIK:
  MocoProblem problem:
    MocoPhase phases:
      ModelProcessor model:
        model: Model scaledModel:
          gravity: 0 -9.80665 0
          length_units: meters
          force_units: N
          credits:
            Rajagopal Model w/ torso, updated knee, modified for movements involving high hip and knee flexion
          publications:
            Lai,A.K.M., Arnold, A.S., Wakeling, J.M. (2017) Why are antagonist muscles co-activated in my simulation? A musculoskeletal model for analysing human locomotor tasks. Annals of Biomedical Engineering
          Ground
          BodySet:
            Body pelvis: mass=10.09681 [kg] mass_center=(-0.07522515 0 0)
                inertia=(0.08813387 0.07467373 0.0496396 0 0 0) meshes=(r_pelvis.vtp l_pelvis.vtp sacrum.vtp)
              WrapCylinder Gmax1_at_pelvis_r: xyz_body_rotation=(-0.6 0.45 0)
                  translation=(-0.08192838 -0.1053365 0.05213084) quadrant=-x radius=0.04082791 length=0.1431077
              WrapCylinder Gmax2_at_pelvis_r: xyz_body_rotation=(-0.75 0.39 0)
                  translation=(-0.08512039 -0.08831241 0.05811307) quadrant=all radius=0.04043258 length=0.0973708
              WrapCylinder Gmax3_at_pelvis_r: xyz_body_rotation=(-0.1 0 0)
                  translation=(-0.08831241 -0.09363243 0.05811307) quadrant=all radius=0.04252253 length=0.08569435
              WrapCylinder Gmax1_at_pelvis_l: xyz_body_rotation=(0.6 -0.45 0)
                  translation=(-0.08192838 -0.1053365 -0.05213084) quadrant=-x radius=0.04082791 length=0.1431077
              WrapCylinder Gmax2_at_pelvis_l: xyz_body_rotation=(0.75 -0.39 0)
                  translation=(-0.08512039 -0.08831241 -0.05811307) quadrant=all radius=0.04043258 length=0.0973708
              WrapCylinder Gmax3_at_pelvis_l: xyz_body_rotation=(0.1 0 0)
                  translation=(-0.08831241 -0.09363243 -0.05811307) quadrant=all radius=0.04252253 length=0.08569435
              WrapCylinder PS_at_brim_r: xyz_body_rotation=(-0.25 -0.27 0.1)
                  translation=(-0.07873636 -0.06384029 0.05606202) quadrant=-y radius=0.05259254 length=0.08841792
              WrapCylinder PS_at_brim_l: xyz_body_rotation=(0.25 0.27 0.1)
                  translation=(-0.07873636 -0.06384029 -0.05606202) quadrant=-y radius=0.05259254 length=0.08841792
              WrapCylinder IL_at_brim_r: xyz_body_rotation=(-0.32 -0.24 0.9)
                  translation=(-0.07554435 -0.06916032 0.06460806) quadrant=-y radius=0.0576281 length=0.08891327
              WrapCylinder IL_at_brim_l: xyz_body_rotation=(0.32 0.24 0.9)
                  translation=(-0.07554435 -0.06916032 -0.06460806) quadrant=-y radius=0.0576281 length=0.08891327
            Body femur_r: mass=7.9744 mass_center=(0 -0.1718796 0) inertia=(0.1147969 0.0300924 0.1210555 0 0 0)
                meshes=r_femur.vtp
              WrapCylinder GasLat_at_condyles_r: translation=(0.004243964 -0.4145333 0) quadrant=all radius=0.02417804
                  length=0.08487928
              WrapCylinder GasMed_at_condyles_r: translation=(0.004243964 -0.4145333 0) quadrant=all radius=0.02324812
                  length=0.08487928
              WrapCylinder KnExt_at_fem_r: xyz_body_rotation=(-0.0623366 0.0507601 0)
                  translation=(0.003045706 -0.4071849 0.001774919) quadrant=all radius=0.0232409 length=0.08494807
              WrapCylinder KnExtVL_at_fem_r: xyz_body_rotation=(-0.0623366 0.0507601 0)
                  translation=(0.001602758 -0.4071849 0.001774919) quadrant=all radius=0.0232409 length=0.08494807
              WrapCylinder AB_at_femshaft_r: xyz_body_rotation=(1.66157 0.186644 0)
                  translation=(0.01242921 -0.1138399 0.01983204) quadrant=all radius=0.01406703 length=0.07032996
              WrapCylinder AL_at_femshaft_r: xyz_body_rotation=(1.77711 0.136489 0)
                  translation=(0.02608569 -0.2344732 0.0128284) quadrant=all radius=0.01716701 length=0.1002107
              WrapCylinder AMprox_at_femshaft_r: xyz_body_rotation=(1.61126 0.18656 0)
                  translation=(0.004399285 -0.07370078 0.02156188) quadrant=all radius=0.01797678 length=0.07039706
              WrapCylinder AMmid_at_femshaft_r: xyz_body_rotation=(1.61139 0.13656 0)
                  translation=(0.01953284 -0.1624879 0.01747172) quadrant=all radius=0.01820243 length=0.1209654
              WrapCylinder AMdist_at_femshaft_r: xyz_body_rotation=(1.71188 0.186636 0)
                  translation=(0.02682737 -0.2636189 0.007948605) quadrant=all radius=0.01860709 length=0.2006074
              WrapCylinder AMisch_at_condyles_r: xyz_body_rotation=(1.71115 -0.463363 0)
                  translation=(-0.01922609 -0.3809975 -0.002677407) quadrant=all radius=0.03470381 length=0.2348104
              WrapCylinder PECT_at_femshaft_r: xyz_body_rotation=(1.81295 0.276344 0)
                  translation=(0.005165524 -0.08543723 0.02583768) quadrant=all radius=0.01290097 length=0.04959105
            Body tibia_r: mass=3.178563 mass_center=(0 -0.1858404 0) inertia=(0.0432096 0.0043724 0.04380973 0 0 0)
                meshes=(r_tibia.vtp r_fibula.vtp)
              WrapCylinder GasLat_at_shank_r: xyz_body_rotation=(2.96723 -0.279725 -1.47812)
                  translation=(-0.005985563 -0.0736593 -0.002669237) quadrant=-y radius=0.04950729 length=0.08146232
              WrapCylinder GasMed_at_shank_r: xyz_body_rotation=(2.96723 0.0279725 -1.47812)
                  translation=(-0.005985563 -0.0736593 -0.002669237) quadrant=-y radius=0.05308349 length=0.08150921
              WrapCylinder GR_at_condyles_r: xyz_body_rotation=(0 -0.4 0) translation=(-0.002426579 -0.01990792 0)
                  quadrant=all radius=0.0324766 length=0.08088598
              WrapCylinder SM_at_condyles_r: xyz_body_rotation=(0 -0.1 0) translation=(-0.0008088598 -0.01990792 0)
                  quadrant=all radius=0.03112341 length=0.08088598
              WrapCylinder ST_at_condyles_r: xyz_body_rotation=(0 -0.2 0) translation=(-0.00161772 -0.02040562 0)
                  quadrant=all radius=0.03834043 length=0.08088598
              WrapCylinder BF140_at_gastroc_r: translation=(-0.03154553 -0.05972375 0) quadrant=y radius=0.02616171
                  length=0.121329
            Body patella_r: mass=0.07390213 mass_center=(0.001819902 0.0266919 0)
                inertia=(2.515259e-6 1.148956e-5 1.148956e-5 0 0 0) meshes=r_patella.vtp
            Body talus_r: mass=0.08573333 mass_center=(0 0 0) inertia=(0.0008573333 0.0008573333 0.0008573333 0 0 0)
                meshes=r_talus.vtp
            Body calcn_r: mass=1.071667 mass_center=(0.0900786 0.02702358 0)
                inertia=(0.001200267 0.0033436 0.003515067 0 0 0) meshes=r_foot.vtp
            Body toes_r: mass=0.1856984 mass_center=(0.0311672 0.005404716 -0.01397307)
                inertia=(8.573333e-5 0.0001714667 0.0008573333 0 0 0) meshes=r_bofoot.vtp
            Body femur_l: mass=7.9744 mass_center=(0 -0.1642156 0) inertia=(0.1147969 0.0300924 0.1210555 0 0 0)
                meshes=l_femur.vtp
              WrapCylinder GasLat_at_condyles_l: translation=(0.004459056 -0.3960495 0) quadrant=all radius=0.02415121
                  length=0.08918113
              WrapCylinder GasMed_at_condyles_l: translation=(0.004459056 -0.3960495 0) quadrant=all radius=0.02322232
                  length=0.08918113
              WrapCylinder KnExt_at_fem_l: xyz_body_rotation=(0.0623366 -0.0507601 0)
                  translation=(0.003200069 -0.3890288 -0.001864875) quadrant=all radius=0.02321887 length=0.08921102
              WrapCylinder KnExtVL_at_fem_l: xyz_body_rotation=(0.0623366 -0.0507601 0)
                  translation=(0.001683989 -0.3890288 -0.001864875) quadrant=all radius=0.02321887 length=0.08921102
              WrapCylinder AB_at_femshaft_l: xyz_body_rotation=(-1.66157 -0.186644 0)
                  translation=(0.01305915 -0.1087639 -0.02083717) quadrant=all radius=0.01474185 length=0.06740637
              WrapCylinder AL_at_femshaft_l: xyz_body_rotation=(-1.77711 -0.136489 0)
                  translation=(0.02740777 -0.2240182 -0.01347857) quadrant=all radius=0.01797169 length=0.09617073
              WrapCylinder AMprox_at_femshaft_l: xyz_body_rotation=(-1.61126 -0.18656 0)
                  translation=(0.004622249 -0.07041451 -0.02265468) quadrant=all radius=0.0188465 length=0.06743834
              WrapCylinder AMmid_at_femshaft_l: xyz_body_rotation=(-1.61139 -0.13656 0)
                  translation=(0.02052281 -0.1552427 -0.01835722) quadrant=all radius=0.0191014 length=0.1157444
              WrapCylinder AMdist_at_femshaft_l: xyz_body_rotation=(-1.71188 -0.186636 0)
                  translation=(0.02818703 -0.2518643 -0.008351456) quadrant=all radius=0.0194865 length=0.19243
              WrapCylinder AMisch_at_condyles_l: xyz_body_rotation=(-1.71115 0.463363 0)
                  translation=(-0.02020051 -0.3640091 0.002813103) quadrant=all radius=0.03600273 length=0.2281167
              WrapCylinder PECT_at_femshaft_l: xyz_body_rotation=(-1.81295 -0.276344 0)
                  translation=(0.005427323 -0.08162764 -0.02714718) quadrant=all radius=0.01345093 length=0.04784133
            Body tibia_l: mass=3.178563 mass_center=(0 -0.1996813 0) inertia=(0.0432096 0.0043724 0.04380973 0 0 0)
                meshes=(l_tibia.vtp l_fibula.vtp)
              WrapCylinder GasLat_at_shank_l: xyz_body_rotation=(-2.96723 0.279725 -1.47812)
                  translation=(-0.00623025 -0.07914522 0.002778355) quadrant=-y radius=0.05243709 length=0.08490783
              WrapCylinder GasMed_at_shank_l: xyz_body_rotation=(-2.96723 -0.0279725 -1.47812)
                  translation=(-0.00623025 -0.07914522 0.002778355) quadrant=-y radius=0.05621873 length=0.08496598
              WrapCylinder GR_at_condyles_l: xyz_body_rotation=(0 0.4 0) translation=(-0.002525777 -0.0213906 0)
                  quadrant=all radius=0.0344062 length=0.08419257
              WrapCylinder SM_at_condyles_l: xyz_body_rotation=(0 0.1 0) translation=(-0.0008419257 -0.0213906 0)
                  quadrant=all radius=0.03297261 length=0.08419257
              WrapCylinder ST_at_condyles_l: xyz_body_rotation=(0 0.2 0) translation=(-0.001683851 -0.02192537 0)
                  quadrant=all radius=0.04061843 length=0.08419257
              WrapCylinder BF140_at_gastroc_l: translation=(-0.0328351 -0.0641718 0) quadrant=all radius=0.02771611
                  length=0.1262889
            Body patella_l: mass=0.07390213 mass_center=(0.001738754 0.02550172 0)
                inertia=(2.295952e-6 1.048778e-5 1.048778e-5 0 0 0) meshes=l_pat.vtp
            Body talus_l: mass=0.08573333 mass_center=(0 0 0) inertia=(0.0008573333 0.0008573333 0.0008573333 0 0 0)
                meshes=l_talus.vtp
            Body calcn_l: mass=1.071667 mass_center=(0.08910719 0.02673216 0)
                inertia=(0.001200267 0.0033436 0.003515067 0 0 0) meshes=l_foot.vtp
            Body toes_l: mass=0.1856984 mass_center=(0.03083109 0.005346432 0.01259985)
                inertia=(8.573333e-5 0.0001714667 0.0008573333 0 0 0) meshes=l_bofoot.vtp
            Body torso: mass=29.06326 mass_center=(-0.02774863 0.3338403 0) inertia=(1.264138 0.6477153 1.227187 0 0 0)
                meshes=(hat_spine.vtp hat_jaw.vtp hat_skull.vtp hat_ribs.vtp)
          JointSet:
            CustomJoint ground_pelvis: socket_parent_frame=ground_offset socket_child_frame=pelvis_offset
              Coordinate pelvis_tilt: default_value=0 range=(-1.570796 1.570796) clamped=true
              Coordinate pelvis_list: default_value=0 range=(-1.570796 1.570796) clamped=true
              Coordinate pelvis_rotation: default_value=0 range=(-1.570796 1.570796) clamped=true
              Coordinate pelvis_tx: default_value=0 range=(-5 5) clamped=true
              Coordinate pelvis_ty: default_value=0.93 range=(-1 2) clamped=true
              Coordinate pelvis_tz: default_value=0 range=(-3 3) clamped=true
              PhysicalOffsetFrame ground_offset: socket_parent=/ground translation=(0 0 0) [meters]
              PhysicalOffsetFrame pelvis_offset: socket_parent=/bodyset/pelvis translation=(0 0 0)
              SpatialTransform:
                TransformAxis rotation1: coordinates=pelvis_tilt axis=(0 0 1) LinearFunction(coefficients=1 0)
                TransformAxis rotation2: coordinates=pelvis_list axis=(1 0 0) LinearFunction(coefficients=1 0)
                TransformAxis rotation3: coordinates=pelvis_rotation axis=(0 1 0) LinearFunction(coefficients=1 0)
                TransformAxis translation1: coordinates=pelvis_tx axis=(1 0 0) LinearFunction(coefficients=1 0)
                TransformAxis translation2: coordinates=pelvis_ty axis=(0 1 0) LinearFunction(coefficients=1 0)
                TransformAxis translation3: coordinates=pelvis_tz axis=(0 0 1) LinearFunction(coefficients=1 0)
            CustomJoint hip_r: socket_parent_frame=pelvis_offset socket_child_frame=femur_r_offset
              Coordinate hip_flexion_r: default_value=2.332052e-9 range=(-0.5235988 2.094395) clamped=true
              Coordinate hip_adduction_r: default_value=-1.199293e-9 range=(-0.8726646 0.5235988) clamped=true
              Coordinate hip_rotation_r: default_value=0 range=(-0.6981317 0.6981317) clamped=true
              PhysicalOffsetFrame pelvis_offset: socket_parent=/bodyset/pelvis
                  translation=(-0.05987794 -0.08351374 0.06602671)
              PhysicalOffsetFrame femur_r_offset: socket_parent=/bodyset/femur_r translation=(0 0 0)
              SpatialTransform: axes_held_at_zero=(translation1 translation2 translation3)
                TransformAxis rotation1: coordinates=hip_flexion_r axis=(0 0 1) LinearFunction(coefficients=1 0)
                TransformAxis rotation2: coordinates=hip_adduction_r axis=(1 0 0) LinearFunction(coefficients=1 0)
                TransformAxis rotation3: coordinates=hip_rotation_r axis=(0 1 0) LinearFunction(coefficients=1 0)
            CustomJoint walker_knee_r: socket_parent_frame=femur_r_offset socket_child_frame=tibia_r_offset
              Coordinate knee_angle_r: default_value=4.877666e-5 range=(0 2.443461) clamped=true
              PhysicalOffsetFrame femur_r_offset: socket_parent=/bodyset/femur_r
                  translation=(-0.003819568 -0.4141288 -0.001485387) orientation=(-1.64157 1.44618 1.5708) [radians]
              PhysicalOffsetFrame tibia_r_offset: socket_parent=/bodyset/tibia_r
                  translation=(-0.006543304 -0.003518525 -0.001200947) orientation=(-1.64157 1.44618 1.5708)
              SpatialTransform:
                TransformAxis rotation1: coordinates=knee_angle_r axis=(1 0 0) LinearFunction(coefficients=1 0)
                TransformAxis rotation2: coordinates=knee_angle_r axis=(0 0 1)
                  SimmSpline: x=(0 0.174533 0.349066 0.523599 0.698132 0.872665 1.0472 1.22173 1.39626 1.5708 1.74533 1.91986 2.0944)
                      y=(0 0.0126809 0.0226969 0.0296054 0.0332049 0.0335354 0.0308779 0.0257548 0.0189295 0.011407 0.00443314 -0.00050475 -0.0016782)
                TransformAxis rotation3: coordinates=knee_angle_r axis=(0 1 0)
                  SimmSpline: x=(0 0.174533 0.349066 0.523599 0.698132 0.872665 1.0472 1.22173 1.39626 1.5708 1.74533 1.91986 2.0944)
                      y=(0 0.059461 0.109399 0.150618 0.18392 0.210107 0.229983 0.24435 0.254012 0.25977 0.262428 0.262788 0.261654)
                TransformAxis translation1: coordinates=knee_angle_r axis=(1 0 0)
                  MultiplierFunction: scale=0.8487928
                    SimmSpline: x=(0 0.174533 0.349066 0.523599 0.698132 0.872665 1.0472 1.22173 1.39626 1.5708 1.74533 1.91986 2.0944)
                        y=(0 5.3e-5 0.000188 0.000378 0.000597 0.000825 0.001045 0.001247 0.00142 0.001558 0.001661 0.001728 0.00176)
                TransformAxis translation2: coordinates=knee_angle_r axis=(0 1 0)
                  MultiplierFunction: scale=1.011057
                    SimmSpline: x=(0 0.174533 0.349066 0.523599 0.698132 0.872665 1.0472 1.22173 1.39626 1.5708 1.74533 1.91986 2.0944)
                        y=(0 0.000301 0.000143 -0.000401 -0.001233 -0.002243 -0.003316 -0.004346 -0.005239 -0.005924 -0.006361 -0.006539 -0.00648)
                TransformAxis translation3: coordinates=knee_angle_r axis=(0 0 1)
                  MultiplierFunction: scale=0.8487928
                    SimmSpline: x=(0 0.174533 0.349066 0.523599 0.698132 0.872665 1.0472 1.22173 1.39626 1.5708 1.74533 1.91986 2.0944)
                        y=(0 0.001055 0.002061 0.00289 0.003447 0.003676 0.003559 0.00311 0.002373 0.001418 0.000329 -0.000805 -0.001898)
            CustomJoint patellofemoral_r: socket_parent_frame=femur_r_offset socket_child_frame=patella_r_offset
              Coordinate knee_angle_r_beta: default_value=4.877666e-5 range=(-99999.9 99999.9) clamped=false
              PhysicalOffsetFrame femur_r_offset: socket_parent=/bodyset/femur_r
                  translation=(-0.006866734 -0.4124707 -0.00233418)
              PhysicalOffsetFrame patella_r_offset: socket_parent=/bodyset/patella_r translation=(0 0 0)
              SpatialTransform: axes_held_at_zero=(rotation2 rotation3)
                TransformAxis rotation1: coordinates=knee_angle_r_beta axis=(0 0 1)
                  SimmSpline: x=(0 0.174533 0.349066 0.523599 0.698132 0.872665 1.0472 1.22173 1.39626 1.5708 1.74533 1.91986 2.0944)
                      y=(0.00113686 -0.00629212 -0.105582 -0.253683 -0.414245 -0.579047 -0.747244 -0.91799 -1.09044 -1.26379 -1.43763 -1.61186 -1.78634)
                TransformAxis translation1: coordinates=knee_angle_r_beta axis=(1 0 0)
                  MultiplierFunction: scale=0.8487928
                    SimmSpline: x=(0 0.174533 0.349066 0.523599 0.698132 0.872665 1.0472 1.22173 1.39626 1.5708 1.74533 1.91986 2.0944)
                        y=(0.0524 0.0488 0.0437 0.0371 0.0296 0.0216 0.0136 0.0057 -0.0019 -0.0088 -0.0148 -0.0196 -0.0227)
                TransformAxis translation2: coordinates=knee_angle_r_beta axis=(0 1 0)
                  MultiplierFunction: scale=1.011057
                    SimmSpline: x=(0 0.174533 0.349066 0.523599 0.698132 0.872665 1.0472 1.22173 1.39626 1.5708 1.74533 1.91986 2.0944)
                        y=(-0.0108 -0.019 -0.0263 -0.0322 -0.0367 -0.0395 -0.0408 -0.0404 -0.0384 -0.0349 -0.0301 -0.0245 -0.0187)
                TransformAxis translation3: axis=(0 0 1) MultiplierFunction(scale=0.8487928, Constant(value=0.00275))
            PinJoint ankle_r: socket_parent_frame=tibia_r_offset socket_child_frame=talus_r_offset
              Coordinate ankle_angle_r: default_value=-1.182866e-9 range=(-0.6981317 0.5235988) clamped=true
              PhysicalOffsetFrame tibia_r_offset: socket_parent=/bodyset/tibia_r
                  translation=(-0.008088598 -0.3981584 0) orientation=(0.175895 -0.105208 0.0186622)
              PhysicalOffsetFrame talus_r_offset: socket_parent=/bodyset/talus_r translation=(0 0 0)
                  orientation=(0.175895 -0.105208 0.0186622)
            PinJoint subtalar_r: socket_parent_frame=talus_r_offset socket_child_frame=calcn_r_offset
              Coordinate subtalar_angle_r: default_value=0 range=(-0.6108652 0.6108652) clamped=true locked=true
              PhysicalOffsetFrame talus_r_offset: socket_parent=/bodyset/talus_r
                  translation=(-0.03944809 -0.04175686 0.00640617) orientation=(-1.76819 0.906223 1.8196)
              PhysicalOffsetFrame calcn_r_offset: socket_parent=/bodyset/calcn_r translation=(0 0 0)
                  orientation=(-1.76819 0.906223 1.8196)
            PinJoint mtp_r: socket_parent_frame=calcn_r_offset socket_child_frame=toes_r_offset
              Coordinate mtp_angle_r: default_value=0 range=(-0.5235988 0.5235988) clamped=true locked=true
              PhysicalOffsetFrame calcn_r_offset: socket_parent=/bodyset/calcn_r
                  translation=(0.1610605 -0.001801572 0.000862338) orientation=(-3.14159 0.619901 0)
              PhysicalOffsetFrame toes_r_offset: socket_parent=/bodyset/toes_r translation=(0 0 0)
                  orientation=(-3.14159 0.619901 0)
            CustomJoint hip_l: socket_parent_frame=pelvis_offset socket_child_frame=femur_l_offset
              Coordinate hip_flexion_l: default_value=2.332052e-9 range=(-0.5235988 2.094395) clamped=true
              Coordinate hip_adduction_l: default_value=-1.199293e-9 range=(-0.8726646 0.5235988) clamped=true
              Coordinate hip_rotation_l: default_value=0 range=(-0.6981317 0.6981317) clamped=true
              PhysicalOffsetFrame pelvis_offset: socket_parent=/bodyset/pelvis
                  translation=(-0.05987794 -0.08351374 -0.06602671)
              PhysicalOffsetFrame femur_l_offset: socket_parent=/bodyset/femur_l translation=(0 0 0)
              SpatialTransform: axes_held_at_zero=(translation1 translation2 translation3)
                TransformAxis rotation1: coordinates=hip_flexion_l axis=(0 0 1) LinearFunction(coefficients=1 0)
                TransformAxis rotation2: coordinates=hip_adduction_l axis=(1 0 0) LinearFunction(coefficients=-1 0)
                TransformAxis rotation3: coordinates=hip_rotation_l axis=(0 1 0) LinearFunction(coefficients=-1 0)
            CustomJoint walker_knee_l: socket_parent_frame=femur_l_offset socket_child_frame=tibia_l_offset
              Coordinate knee_angle_l: default_value=4.877992e-5 range=(0 2.443461) clamped=true
              PhysicalOffsetFrame femur_l_offset: socket_parent=/bodyset/femur_l
                  translation=(-0.004013151 -0.3956631 0.00156067) orientation=(1.64157 -1.44618 1.5708)
              PhysicalOffsetFrame tibia_l_offset: socket_parent=/bodyset/tibia_l
                  translation=(-0.006810792 -0.003780575 0.001250041) orientation=(1.64157 -1.44618 1.5708)
              SpatialTransform:
                TransformAxis rotation1: coordinates=knee_angle_l axis=(-1 0 0) LinearFunction(coefficients=1 0)
                TransformAxis rotation2: coordinates=knee_angle_l axis=(0 0 1)
                  SimmSpline: x=(0 0.174533 0.349066 0.523599 0.698132 0.872665 1.0472 1.22173 1.39626 1.5708 1.74533 1.91986 2.0944)
                      y=(0 0.0126809 0.0226969 0.0296054 0.0332049 0.0335354 0.0308779 0.0257548 0.0189295 0.011407 0.00443314 -0.00050475 -0.0016782)
                TransformAxis rotation3: coordinates=knee_angle_l axis=(0 1 0)
                  SimmSpline: x=(0 0.174533 0.349066 0.523599 0.698132 0.872665 1.0472 1.22173 1.39626 1.5708 1.74533 1.91986 2.0944)
                      y=(0 -0.059461 -0.109399 -0.150618 -0.18392 -0.210107 -0.229983 -0.24435 -0.254012 -0.25977 -0.262428 -0.262788 -0.261654)
                TransformAxis translation1: coordinates=knee_angle_l axis=(1 0 0)
                  MultiplierFunction: scale=0.8918113
                    SimmSpline: x=(0 0.174533 0.349066 0.523599 0.698132 0.872665 1.0472 1.22173 1.39626 1.5708 1.74533 1.91986 2.0944)
                        y=(0 5.3e-5 0.000188 0.000378 0.000597 0.000825 0.001045 0.001247 0.00142 0.001558 0.001661 0.001728 0.00176)
                TransformAxis translation2: coordinates=knee_angle_l axis=(0 1 0)
                  MultiplierFunction: scale=0.9659744
                    SimmSpline: x=(0 0.174533 0.349066 0.523599 0.698132 0.872665 1.0472 1.22173 1.39626 1.5708 1.74533 1.91986 2.0944)
                        y=(0 0.000301 0.000143 -0.000401 -0.001233 -0.002243 -0.003316 -0.004346 -0.005239 -0.005924 -0.006361 -0.006539 -0.00648)
                TransformAxis translation3: coordinates=knee_angle_l axis=(0 0 1)
                  MultiplierFunction: scale=0.8918113
                    SimmSpline: x=(0 0.174533 0.349066 0.523599 0.698132 0.872665 1.0472 1.22173 1.39626 1.5708 1.74533 1.91986 2.0944)
                        y=(0 -0.001055 -0.002061 -0.00289 -0.003447 -0.003676 -0.003559 -0.00311 -0.002373 -0.001418 -0.000329 0.000805 0.001898)
            CustomJoint patellofemoral_l: socket_parent_frame=femur_l_offset socket_child_frame=patella_l_offset
              Coordinate knee_angle_l_beta: default_value=4.877992e-5 range=(-99999.9 99999.9) clamped=false
              PhysicalOffsetFrame femur_l_offset: socket_parent=/bodyset/femur_l
                  translation=(-0.007214753 -0.3940789 0.002452481)
              PhysicalOffsetFrame patella_l_offset: socket_parent=/bodyset/patella_l translation=(0 0 0)
              SpatialTransform: axes_held_at_zero=(rotation2 rotation3)
                TransformAxis rotation1: coordinates=knee_angle_l_beta axis=(0 0 1)
                  SimmSpline: x=(0 0.174533 0.349066 0.523599 0.698132 0.872665 1.0472 1.22173 1.39626 1.5708 1.74533 1.91986 2.0944)
                      y=(0.00113686 -0.00629212 -0.105582 -0.253683 -0.414245 -0.579047 -0.747244 -0.91799 -1.09044 -1.26379 -1.43763 -1.61186 -1.78634)
                TransformAxis translation1: coordinates=knee_angle_l_beta axis=(1 0 0)
                  MultiplierFunction: scale=0.8918113
                    SimmSpline: x=(0 0.174533 0.349066 0.523599 0.698132 0.872665 1.0472 1.22173 1.39626 1.5708 1.74533 1.91986 2.0944)
                        y=(0.0524 0.0488 0.0437 0.0371 0.0296 0.0216 0.0136 0.0057 -0.0019 -0.0088 -0.0148 -0.0196 -0.0227)
                TransformAxis translation2: coordinates=knee_angle_l_beta axis=(0 1 0)
                  MultiplierFunction: scale=0.9659744
                    SimmSpline: x=(0 0.174533 0.349066 0.523599 0.698132 0.872665 1.0472 1.22173 1.39626 1.5708 1.74533 1.91986 2.0944)
                        y=(-0.0108 -0.019 -0.0263 -0.0322 -0.0367 -0.0395 -0.0408 -0.0404 -0.0384 -0.0349 -0.0301 -0.0245 -0.0187)
                TransformAxis translation3: axis=(0 0 1) MultiplierFunction(scale=0.8918113, Constant(value=-0.00275))
            PinJoint ankle_l: socket_parent_frame=tibia_l_offset socket_child_frame=talus_l_offset
              Coordinate ankle_angle_l: default_value=8.352658e-11 range=(-0.6981317 0.5235988) clamped=true
              PhysicalOffsetFrame tibia_l_offset: socket_parent=/bodyset/tibia_l translation=(-0.008419257 -0.427812 0)
                  orientation=(-0.175895 0.105208 0.0186622)
              PhysicalOffsetFrame talus_l_offset: socket_parent=/bodyset/talus_l translation=(0 0 0)
                  orientation=(-0.175895 0.105208 0.0186622)
            PinJoint subtalar_l: socket_parent_frame=talus_l_offset socket_child_frame=calcn_l_offset
              Coordinate subtalar_angle_l: default_value=0 range=(-0.6108652 0.6108652) clamped=true locked=true
              PhysicalOffsetFrame talus_l_offset: socket_parent=/bodyset/talus_l
                  translation=(-0.04106072 -0.04486679 -0.006668052) orientation=(1.76819 -0.906223 1.8196)
              PhysicalOffsetFrame calcn_l_offset: socket_parent=/bodyset/calcn_l translation=(0 0 0)
                  orientation=(1.76819 -0.906223 1.8196)
            PinJoint mtp_l: socket_parent_frame=calcn_l_offset socket_child_frame=toes_l_offset
              Coordinate mtp_angle_l: default_value=0 range=(-0.5235988 0.5235988) clamped=true locked=true
              PhysicalOffsetFrame calcn_l_offset: socket_parent=/bodyset/calcn_l
                  translation=(0.1593237 -0.001782144 -0.0007775905) orientation=(-3.14159 -0.619901 0)
              PhysicalOffsetFrame toes_l_offset: socket_parent=/bodyset/toes_l translation=(0 0 0)
                  orientation=(-3.14159 -0.619901 0)
            CustomJoint back: socket_parent_frame=pelvis_offset socket_child_frame=torso_offset
              Coordinate lumbar_extension: default_value=0 range=(-1.570796 1.570796) clamped=false
              Coordinate lumbar_bending: default_value=0 range=(-1.570796 1.570796) clamped=false
              Coordinate lumbar_rotation: default_value=0 range=(-1.570796 1.570796) clamped=false
              PhysicalOffsetFrame pelvis_offset: socket_parent=/bodyset/pelvis translation=(-0.1071453 0.0867164 0)
              PhysicalOffsetFrame torso_offset: socket_parent=/bodyset/torso translation=(0 0 0)
              SpatialTransform: axes_held_at_zero=(translation1 translation2 translation3)
                TransformAxis rotation1: coordinates=lumbar_extension axis=(0 0 1) LinearFunction(coefficients=1 0)
                TransformAxis rotation2: coordinates=lumbar_bending axis=(1 0 0) LinearFunction(coefficients=1 0)
                TransformAxis rotation3: coordinates=lumbar_rotation axis=(0 1 0) LinearFunction(coefficients=1 0)
          ConstraintSet:
            CoordinateCouplerConstraint patellofemoral_knee_angle_r_con: independent_coordinate_names=knee_angle_r
                dependent_coordinate_name=knee_angle_r_beta scale_factor=1
                coupled_coordinates_function=LinearFunction(coefficients=1 0)
            CoordinateCouplerConstraint patellofemoral_knee_angle_l_con: independent_coordinate_names=knee_angle_l
                dependent_coordinate_name=knee_angle_l_beta scale_factor=1
                coupled_coordinates_function=LinearFunction(coefficients=1 0)
          ForceSet:
            SmoothSphereHalfSpaceForce [values shared by the 12 below unless stated]: appliesForce=false
                socket_half_space=/contactgeometryset/floor stiffness=3067776 [N/m^2] dissipation=2 [s/m]
                static_friction=0.8 dynamic_friction=0.8 viscous_friction=0.5 transition_velocity=0.2 [m/s]
                hertz_smoothing=300 hunt_crossley_smoothing=50
            SmoothSphereHalfSpaceForce contactHeel_r: socket_sphere=/contactgeometryset/heel_r
            SmoothSphereHalfSpaceForce contactMH1_r: socket_sphere=/contactgeometryset/mh1_r
            SmoothSphereHalfSpaceForce contactMH3_r: socket_sphere=/contactgeometryset/mh3_r
            SmoothSphereHalfSpaceForce contactMH5_r: socket_sphere=/contactgeometryset/mh5_r
            SmoothSphereHalfSpaceForce contactHallux_r: socket_sphere=/contactgeometryset/hallux_r
            SmoothSphereHalfSpaceForce contactOtherToes_r: socket_sphere=/contactgeometryset/othertoes_r
                stiffness=306777.6
            SmoothSphereHalfSpaceForce contactHeel_l: socket_sphere=/contactgeometryset/heel_l
            SmoothSphereHalfSpaceForce contactMH1_l: socket_sphere=/contactgeometryset/mh1_l
            SmoothSphereHalfSpaceForce contactMH3_l: socket_sphere=/contactgeometryset/mh3_l
            SmoothSphereHalfSpaceForce contactMH5_l: socket_sphere=/contactgeometryset/mh5_l
            SmoothSphereHalfSpaceForce contactHallux_l: socket_sphere=/contactgeometryset/hallux_l
            SmoothSphereHalfSpaceForce contactOtherToes_l: socket_sphere=/contactgeometryset/othertoes_l
                stiffness=306777.6
            CoordinateActuator tau_pelvis_tilt: coordinate=pelvis_tilt optimal_force=1000
            CoordinateActuator tau_pelvis_list: coordinate=pelvis_list optimal_force=1000
            CoordinateActuator tau_pelvis_rotation: coordinate=pelvis_rotation optimal_force=1000
            CoordinateActuator tau_pelvis_tx: coordinate=pelvis_tx optimal_force=1000
            CoordinateActuator tau_pelvis_ty: coordinate=pelvis_ty optimal_force=1000
            CoordinateActuator tau_pelvis_tz: coordinate=pelvis_tz optimal_force=1000
            CoordinateActuator tau_hip_flexion_r: coordinate=hip_flexion_r optimal_force=1000
            CoordinateActuator tau_hip_adduction_r: coordinate=hip_adduction_r optimal_force=1000
            CoordinateActuator tau_hip_rotation_r: coordinate=hip_rotation_r optimal_force=1000
            CoordinateActuator tau_knee_angle_r: coordinate=knee_angle_r optimal_force=1000
            CoordinateActuator tau_knee_angle_r_beta: coordinate=knee_angle_r_beta optimal_force=1000
            CoordinateActuator tau_ankle_angle_r: coordinate=ankle_angle_r optimal_force=1000
            CoordinateActuator tau_subtalar_angle_r: coordinate=subtalar_angle_r optimal_force=1000
            CoordinateActuator tau_mtp_angle_r: coordinate=mtp_angle_r optimal_force=1000
            CoordinateActuator tau_hip_flexion_l: coordinate=hip_flexion_l optimal_force=1000
            CoordinateActuator tau_hip_adduction_l: coordinate=hip_adduction_l optimal_force=1000
            CoordinateActuator tau_hip_rotation_l: coordinate=hip_rotation_l optimal_force=1000
            CoordinateActuator tau_knee_angle_l: coordinate=knee_angle_l optimal_force=1000
            CoordinateActuator tau_knee_angle_l_beta: coordinate=knee_angle_l_beta optimal_force=1000
            CoordinateActuator tau_ankle_angle_l: coordinate=ankle_angle_l optimal_force=1000
            CoordinateActuator tau_subtalar_angle_l: coordinate=subtalar_angle_l optimal_force=1000
            CoordinateActuator tau_mtp_angle_l: coordinate=mtp_angle_l optimal_force=1000
            CoordinateActuator tau_lumbar_extension: coordinate=lumbar_extension optimal_force=1000
            CoordinateActuator tau_lumbar_bending: coordinate=lumbar_bending optimal_force=1000
            CoordinateActuator tau_lumbar_rotation: coordinate=lumbar_rotation optimal_force=1000
          MarkerSet:
            Marker C7: torso (-0.06651514 0.4630439 -6.636172e-9) fixed=true
            Marker T10: torso (-0.09969991 0.1654701 -0.009520384) fixed=true
            Marker CLAV: torso (0.04699841 0.3804789 0.0009735321) fixed=true
            Marker STRN: torso (0.1025275 0.2056519 -0.002098622) fixed=true
            Marker RACR: torso (-0.01698966 0.4346048 0.1463218) fixed=true
            Marker LACR: torso (-0.01511015 0.4365964 -0.1420658) fixed=true
            Marker RASI: pelvis (0.01086179 0.01175906 0.1102704) fixed=true
            Marker LASI: pelvis (0.01138517 0.01180013 -0.1101234) fixed=true
            Marker RPSI: pelvis (-0.1813224 0.04172431 0.03859357) fixed=true
            Marker LPSI: pelvis (-0.1713516 0.043162 -0.04024057) fixed=true
            Marker RTH1: femur_r (0.0034741 -0.1130048 0.08627809)
            Marker RTH2: femur_r (0.07057398 -0.1977576 0.07049301)
            Marker RTH3: femur_r (0.01130354 -0.2627342 0.07520932)
            Marker RLFC: femur_r (-0.001702721 -0.4052012 0.05667203) fixed=true
            Marker RMFC: femur_r (-0.004125447 -0.4075762 -0.04830879) fixed=true
            Marker RTB3: tibia_r (0.02614162 -0.2392106 -0.001762716)
            Marker RTB2: tibia_r (0.009981896 -0.1712947 0.04512629)
            Marker RTB1: tibia_r (0.02282667 -0.1138972 -0.005964621)
            Marker RLMAL: tibia_r (-0.004044299 -0.4114399 0.05095817) fixed=true
            Marker RMMAL: tibia_r (0.004580622 -0.3907228 -0.03489793) fixed=true
            Marker RCAL: calcn_r (-0.03118026 -0.01029103 -0.00582245) fixed=true
            Marker RMT5: calcn_r (0.1683281 0.01048182 0.05332043)
            Marker RMT1: calcn_r (0.1912945 0.0105237 -0.03850603)
            Marker LTH1: femur_l (0.01519807 -0.1016234 -0.08792804)
            Marker LTH2: femur_l (0.07020035 -0.1795234 -0.0824039)
            Marker LTH3: femur_l (0.01324322 -0.2436043 -0.08079489)
            Marker LLFC: femur_l (0.0004747861 -0.3992788 -0.06062783) fixed=true
            Marker LMFC: femur_l (-0.002649803 -0.3901107 0.05088381) fixed=true
            Marker LTB3: tibia_l (0.03277053 -0.2458058 0.003884662)
            Marker LTB2: tibia_l (0.03555427 -0.1749634 -0.04964196)
            Marker LTB1: tibia_l (0.02579745 -0.1168729 0.002569557)
            Marker LLMAL: tibia_l (-0.01262889 -0.4158333 -0.04462206) fixed=true
            Marker LMMAL: tibia_l (0.00621214 -0.4175381 0.04043096) fixed=true
            Marker LCAL: calcn_l (-0.03241898 -0.006857244 0.001665476) fixed=true
            Marker LMT5: calcn_l (0.1737082 0.005679336 -0.0511795)
            Marker LMT1: calcn_l (0.1889937 0.01423247 0.03658635)
          ContactGeometrySet:
            ContactSphere heel_r: socket_frame=/bodyset/calcn_r location=(0.02820138 0.009400461 0) radius=0.03033372
            ContactSphere mh1_r: socket_frame=/bodyset/calcn_r location=(0.1639431 -0.007296367 -0.0183646)
                radius=0.01300016
            ContactSphere mh3_r: socket_frame=/bodyset/calcn_r location=(0.1493503 -0.007296367 0.009262148)
                radius=0.01300016
            ContactSphere mh5_r: socket_frame=/bodyset/calcn_r location=(0.1288124 -0.007296367 0.02954306)
                radius=0.01300016
            ContactSphere hallux_r: socket_frame=/bodyset/toes_r location=(0.05062417 -0.009188017 -0.01445214)
                radius=0.01300016
            ContactSphere othertoes_r: socket_frame=/bodyset/toes_r location=(0.03972466 -0.005404716 0.01932276)
                radius=0.01300016
            ContactSphere heel_l: socket_frame=/bodyset/calcn_l location=(0.02789726 0.009299087 0) radius=0.02919158
            ContactSphere mh1_l: socket_frame=/bodyset/calcn_l location=(0.1621751 -0.007217683 0.01655979)
                radius=0.01251068
            ContactSphere mh3_l: socket_frame=/bodyset/calcn_l location=(0.1477397 -0.007217683 -0.008351896)
                radius=0.01251068
            ContactSphere mh5_l: socket_frame=/bodyset/calcn_l location=(0.1274233 -0.007217683 -0.02663967)
                radius=0.01251068
            ContactSphere hallux_l: socket_frame=/bodyset/toes_l location=(0.05007825 -0.009088934 0.01303184)
                radius=0.01251068
            ContactSphere othertoes_l: socket_frame=/bodyset/toes_l location=(0.03929628 -0.005346432 -0.01742378)
                radius=0.01251068
            ContactHalfSpace floor: socket_frame=/ground orientation=(0 0 -1.570796)
          ComponentSet:
            ExternalLoads: datafile=Jog05_grf.mot lowpass_cutoff_frequency_for_load_kinematics=10
              ExternalForce calcn_r: applied_to_body=calcn_r force_expressed_in_body=ground
                  point_expressed_in_body=ground force_identifier=calcn_r_ground_force_v
                  point_identifier=calcn_r_ground_force_p torque_identifier=calcn_r_ground_torque_
                  data_source_name=Jog05_grf.mot
              ExternalForce calcn_l: applied_to_body=calcn_l force_expressed_in_body=ground
                  point_expressed_in_body=ground force_identifier=calcn_l_ground_force_v
                  point_identifier=calcn_l_ground_force_p torque_identifier=calcn_l_ground_torque_
                  data_source_name=Jog05_grf.mot
      MocoInitialBounds time_initial_bounds: bounds=1.22
      MocoFinalBounds time_final_bounds: bounds=1.58
      goals:
        MocoStateTrackingGoal state_tracking: weight=5 allow_unused_references=true scale_weights_with_range=false
          TableProcessor reference
          MocoWeightSet state_weights:
            MocoWeight /jointset/ground_pelvis/pelvis_tilt/value: weight=1
            MocoWeight /jointset/ground_pelvis/pelvis_tilt/speed: weight=1
            MocoWeight /jointset/ground_pelvis/pelvis_list/value: weight=1
            MocoWeight /jointset/ground_pelvis/pelvis_list/speed: weight=1
            MocoWeight /jointset/ground_pelvis/pelvis_rotation/value: weight=1
            MocoWeight /jointset/ground_pelvis/pelvis_rotation/speed: weight=1
            MocoWeight /jointset/ground_pelvis/pelvis_tx/value: weight=1
            MocoWeight /jointset/ground_pelvis/pelvis_tx/speed: weight=1
            MocoWeight /jointset/ground_pelvis/pelvis_ty/value: weight=1
            MocoWeight /jointset/ground_pelvis/pelvis_ty/speed: weight=1
            MocoWeight /jointset/ground_pelvis/pelvis_tz/value: weight=1
            MocoWeight /jointset/ground_pelvis/pelvis_tz/speed: weight=1
            MocoWeight /jointset/hip_r/hip_flexion_r/value: weight=5
            MocoWeight /jointset/hip_r/hip_flexion_r/speed: weight=5
            MocoWeight /jointset/hip_r/hip_adduction_r/value: weight=5
            MocoWeight /jointset/hip_r/hip_adduction_r/speed: weight=5
            MocoWeight /jointset/hip_r/hip_rotation_r/value: weight=5
            MocoWeight /jointset/hip_r/hip_rotation_r/speed: weight=5
            MocoWeight /jointset/walker_knee_r/knee_angle_r/value: weight=5
            MocoWeight /jointset/walker_knee_r/knee_angle_r/speed: weight=5
            MocoWeight /jointset/patellofemoral_r/knee_angle_r_beta/value: weight=5
            MocoWeight /jointset/patellofemoral_r/knee_angle_r_beta/speed: weight=5
            MocoWeight /jointset/ankle_r/ankle_angle_r/value: weight=5
            MocoWeight /jointset/ankle_r/ankle_angle_r/speed: weight=5
            MocoWeight /jointset/subtalar_r/subtalar_angle_r/value: weight=5
            MocoWeight /jointset/subtalar_r/subtalar_angle_r/speed: weight=5
            MocoWeight /jointset/mtp_r/mtp_angle_r/value: weight=5
            MocoWeight /jointset/mtp_r/mtp_angle_r/speed: weight=5
            MocoWeight /jointset/hip_l/hip_flexion_l/value: weight=5
            MocoWeight /jointset/hip_l/hip_flexion_l/speed: weight=5
            MocoWeight /jointset/hip_l/hip_adduction_l/value: weight=5
            MocoWeight /jointset/hip_l/hip_adduction_l/speed: weight=5
            MocoWeight /jointset/hip_l/hip_rotation_l/value: weight=5
            MocoWeight /jointset/hip_l/hip_rotation_l/speed: weight=5
            MocoWeight /jointset/walker_knee_l/knee_angle_l/value: weight=5
            MocoWeight /jointset/walker_knee_l/knee_angle_l/speed: weight=5
            MocoWeight /jointset/patellofemoral_l/knee_angle_l_beta/value: weight=5
            MocoWeight /jointset/patellofemoral_l/knee_angle_l_beta/speed: weight=5
            MocoWeight /jointset/ankle_l/ankle_angle_l/value: weight=5
            MocoWeight /jointset/ankle_l/ankle_angle_l/speed: weight=5
            MocoWeight /jointset/subtalar_l/subtalar_angle_l/value: weight=5
            MocoWeight /jointset/subtalar_l/subtalar_angle_l/speed: weight=5
            MocoWeight /jointset/mtp_l/mtp_angle_l/value: weight=5
            MocoWeight /jointset/mtp_l/mtp_angle_l/speed: weight=5
            MocoWeight /jointset/back/lumbar_extension/value: weight=5
            MocoWeight /jointset/back/lumbar_extension/speed: weight=5
            MocoWeight /jointset/back/lumbar_bending/value: weight=5
            MocoWeight /jointset/back/lumbar_bending/speed: weight=5
            MocoWeight /jointset/back/lumbar_rotation/value: weight=5
            MocoWeight /jointset/back/lumbar_rotation/speed: weight=5
        MocoControlGoal control_effort: weight=0.001 exponent=2 divide_by_displacement=true
          MocoWeightSet control_weights:
            MocoWeight /forceset/tau_pelvis_tilt: weight=10
            MocoWeight /forceset/tau_pelvis_list: weight=10
            MocoWeight /forceset/tau_pelvis_rotation: weight=10
            MocoWeight /forceset/tau_pelvis_tx: weight=10
            MocoWeight /forceset/tau_pelvis_ty: weight=10
            MocoWeight /forceset/tau_pelvis_tz: weight=10
            MocoWeight /forceset/tau_hip_flexion_r: weight=1
            MocoWeight /forceset/tau_hip_adduction_r: weight=1
            MocoWeight /forceset/tau_hip_rotation_r: weight=1
            MocoWeight /forceset/tau_knee_angle_r: weight=1
            MocoWeight /forceset/tau_knee_angle_r_beta: weight=1
            MocoWeight /forceset/tau_ankle_angle_r: weight=1
            MocoWeight /forceset/tau_subtalar_angle_r: weight=1
            MocoWeight /forceset/tau_mtp_angle_r: weight=1
            MocoWeight /forceset/tau_hip_flexion_l: weight=1
            MocoWeight /forceset/tau_hip_adduction_l: weight=1
            MocoWeight /forceset/tau_hip_rotation_l: weight=1
            MocoWeight /forceset/tau_knee_angle_l: weight=1
            MocoWeight /forceset/tau_knee_angle_l_beta: weight=1
            MocoWeight /forceset/tau_ankle_angle_l: weight=1
            MocoWeight /forceset/tau_subtalar_angle_l: weight=1
            MocoWeight /forceset/tau_mtp_angle_l: weight=1
            MocoWeight /forceset/tau_lumbar_extension: weight=1
            MocoWeight /forceset/tau_lumbar_bending: weight=1
            MocoWeight /forceset/tau_lumbar_rotation: weight=1
      path_constraints: MocoFrameDistanceConstraint foot_ground_constraint: projection=vector projection_vector=(0 1 0)
        frame_pairs:
          MocoFrameDistanceConstraintPair: frame1_path=/bodyset/calcn_r frame2_path=/ground minimum_distance=1e-10
              maximum_distance=Inf
          MocoFrameDistanceConstraintPair: frame1_path=/bodyset/calcn_l frame2_path=/ground minimum_distance=1e-10
              maximum_distance=Inf
          MocoFrameDistanceConstraintPair: frame1_path=/bodyset/toes_r frame2_path=/ground minimum_distance=1e-10
              maximum_distance=Inf
          MocoFrameDistanceConstraintPair: frame1_path=/bodyset/toes_l frame2_path=/ground minimum_distance=1e-10
              maximum_distance=Inf
  MocoCasADiSolver solver:
    num_mesh_intervals: 50
    optim_max_iterations: 1000
    optim_convergence_tolerance: 0.001
    optim_constraint_tolerance: 0.001
