# OpenSim document version 40000
ScaleTool:
  mass: 64.3 [kg]
  height: -1
  age: -1
  GenericModelMaker:
    model_file: E:\+GitRepos+\predictive-gait-sims-pfjloading-mtlb\Piloting\FullMocoProcess\GenericModel\pfjLoading_GenericOsimModel_LaiArnold.osim
  ModelScaler:
    apply: true
    scaling_order: measurements
    marker_file: E:\+GitRepos+\predictive-gait-sims-pfjloading-mtlb\Piloting\FullMocoProcess\Data\staticVirtualMarkers.trc
    time_range: 0.5 1.5
    preserve_mass_distribution: true
    output_model_file: E:\+GitRepos+\predictive-gait-sims-pfjloading-mtlb\Piloting\FullMocoProcess\Data\scaledModel.osim
    output_scale_file: E:\+GitRepos+\predictive-gait-sims-pfjloading-mtlb\Piloting\FullMocoProcess\Data\scaleSet.xml
    MeasurementSet:
      Measurement torso_height: apply=true
        MarkerPair: markers=(MTOR MPEL)
        BodyScale torso: axes=Y
      Measurement torso_breadth: apply=true
        MarkerPair: markers=(C7 CLAV)
        MarkerPair: markers=(T10 STRN)
        BodyScale torso: axes=X
      Measurement torso_width: apply=true
        MarkerPair: markers=(RACR LACR)
        BodyScale torso: axes=Z
      Measurement pelvis_w: apply=true
        MarkerPair: markers=(RASI LASI)
        MarkerPair: markers=(RPSI LPSI)
        BodyScale pelvis: axes=Z
      Measurement pelvis_d: apply=true
        MarkerPair: markers=(RASI RPSI)
        MarkerPair: markers=(LASI LPSI)
        BodyScale pelvis: axes=X
      Measurement pelvis_h: apply=true
        MarkerPair: markers=(MPEL RHJC)
        MarkerPair: markers=(MPEL LHJC)
        BodyScale pelvis: axes=Y
      Measurement r_thigh_length: apply=true
        MarkerPair: markers=(RHJC RKJC)
        BodyScale femur_r: axes=Y
        BodyScale patella_r: axes=(X Y Z)
      Measurement r_thigh_breadth: apply=true
        MarkerPair: markers=(RLFC RMFC)
        BodyScale femur_r: axes=(X Z)
      Measurement r_tibia_length: apply=true
        MarkerPair: markers=(RKJC RAJC)
        BodyScale tibia_r: axes=Y
        BodyScale talus_r: axes=Y
      Measurement r_tibia_breadth: apply=true
        MarkerPair: markers=(RLMAL RMMAL)
        BodyScale tibia_r: axes=(X Z)
        BodyScale talus_r: axes=(X Z)
        BodyScale calcn_r: axes=Z
      Measurement r_foot_length: apply=true
        MarkerPair: markers=(fRCAL fRAJC)
        MarkerPair: markers=(fRAJC fRMT3)
        BodyScale calcn_r: axes=X
        BodyScale toes_r: axes=X
      Measurement r_foot_height: apply=true
        MarkerPair: markers=(RAJC fRAJC)
        BodyScale calcn_r: axes=Y
        BodyScale toes_r: axes=Y
      Measurement r_foot_width: apply=true
        MarkerPair: markers=(fRMT1 fRMT5)
        BodyScale toes_r: axes=Z
      Measurement l_thigh_length: apply=true
        MarkerPair: markers=(LHJC LKJC)
        BodyScale femur_l: axes=Y
        BodyScale patella_l: axes=(X Y Z)
      Measurement l_thigh_breadth: apply=true
        MarkerPair: markers=(LLFC LMFC)
        BodyScale femur_l: axes=(X Z)
      Measurement l_tibia_length: apply=true
        MarkerPair: markers=(LKJC LAJC)
        BodyScale tibia_l: axes=Y
        BodyScale talus_l: axes=Y
      Measurement l_tibia_breadth: apply=true
        MarkerPair: markers=(LLMAL LMMAL)
        BodyScale tibia_l: axes=(X Z)
        BodyScale talus_l: axes=(X Z)
        BodyScale calcn_l: axes=Z
      Measurement l_foot_length: apply=true
        MarkerPair: markers=(fLCAL fLAJC)
        MarkerPair: markers=(fLAJC fLMT3)
        BodyScale calcn_l: axes=X
        BodyScale toes_l: axes=X
      Measurement l_foot_height: apply=true
        MarkerPair: markers=(LAJC fLAJC)
        BodyScale calcn_l: axes=Y
        BodyScale toes_l: axes=Y
      Measurement l_foot_width: apply=true
        MarkerPair: markers=(fLMT1 fLMT5)
        BodyScale toes_l: axes=Z
  MarkerPlacer:
    apply: true
    marker_file: E:\+GitRepos+\predictive-gait-sims-pfjloading-mtlb\Piloting\FullMocoProcess\Data\staticVirtualMarkers.trc
    time_range: 0.5 1.5
    output_motion_file: E:\+GitRepos+\predictive-gait-sims-pfjloading-mtlb\Piloting\FullMocoProcess\Data\static_motion.mot
    output_model_file: E:\+GitRepos+\predictive-gait-sims-pfjloading-mtlb\Piloting\FullMocoProcess\Data\scaledModelAdjusted.osim
    max_marker_movement: -1
    IKTaskSet:
      IKMarkerTask C7: apply=true weight=3
      IKMarkerTask T10: apply=true weight=3
      IKMarkerTask CLAV: apply=true weight=3
      IKMarkerTask MTOR: apply=true weight=10
      IKMarkerTask STRN: apply=true weight=1
      IKMarkerTask RACR: apply=true weight=3
      IKMarkerTask LACR: apply=true weight=3
      IKMarkerTask RASI: apply=true weight=5
      IKMarkerTask LASI: apply=true weight=5
      IKMarkerTask LPSI: apply=true weight=5
      IKMarkerTask RPSI: apply=true weight=5
      IKMarkerTask MPEL: apply=true weight=10
      IKMarkerTask RTH1: apply=true weight=1
      IKMarkerTask RTH2: apply=true weight=1
      IKMarkerTask RTH3: apply=true weight=1
      IKMarkerTask RHJC: apply=true weight=10
      IKMarkerTask RLFC: apply=true weight=3
      IKMarkerTask RMFC: apply=true weight=3
      IKMarkerTask RKJC: apply=true weight=10
      IKMarkerTask RTB1: apply=true weight=1
      IKMarkerTask RTB2: apply=true weight=1
      IKMarkerTask RTB3: apply=true weight=1
      IKMarkerTask RLMAL: apply=true weight=5
      IKMarkerTask RMMAL: apply=true weight=5
      IKMarkerTask RAJC: apply=true weight=10
      IKMarkerTask fRAJC: apply=true weight=100
      IKMarkerTask RCAL: apply=true weight=3
      IKMarkerTask fRCAL: apply=true weight=100
      IKMarkerTask RMT5: apply=true weight=3
      IKMarkerTask fRMT5: apply=true weight=100
      IKMarkerTask RMT3: apply=true weight=3
      IKMarkerTask fRMT3: apply=true weight=100
      IKMarkerTask RMT1: apply=true weight=3
      IKMarkerTask fRMT1: apply=true weight=100
      IKMarkerTask LTH1: apply=true weight=1
      IKMarkerTask LTH2: apply=true weight=1
      IKMarkerTask LTH3: apply=true weight=1
      IKMarkerTask LHJC: apply=true weight=10
      IKMarkerTask LLFC: apply=true weight=3
      IKMarkerTask LMFC: apply=true weight=3
      IKMarkerTask LKJC: apply=true weight=10
      IKMarkerTask LTB1: apply=true weight=1
      IKMarkerTask LTB2: apply=true weight=1
      IKMarkerTask LTB3: apply=true weight=1
      IKMarkerTask LLMAL: apply=true weight=5
      IKMarkerTask LMMAL: apply=true weight=5
      IKMarkerTask LAJC: apply=true weight=10
      IKMarkerTask fLAJC: apply=true weight=100
      IKMarkerTask LCAL: apply=true weight=3
      IKMarkerTask fLCAL: apply=true weight=100
      IKMarkerTask LMT5: apply=true weight=3
      IKMarkerTask fLMT5: apply=true weight=100
      IKMarkerTask LMT3: apply=true weight=3
      IKMarkerTask fLMT3: apply=true weight=100
      IKMarkerTask LMT1: apply=true weight=3
      IKMarkerTask fLMT1: apply=true weight=100
