# OpenSim document version 20302
MeasurementSet:
  Measurement torso_height: apply=true
    MarkerPair: markers=(RACR RPSI)
    MarkerPair: markers=(RACR RASI)
    MarkerPair: markers=(LACR LPSI)
    MarkerPair: markers=(LACR LASI)
    BodyScale torso: axes=Y
  Measurement torso_breadth: apply=true
    MarkerPair: markers=(C7 CLAV)
    BodyScale torso: axes=X
  Measurement torso_width: apply=true
    MarkerPair: markers=(RACR LACR)
    BodyScale torso: axes=Z
  Measurement pelvis_w: apply=true
    MarkerPair: markers=(RASI LASI)
    MarkerPair: markers=(RPSI LPSI)
    BodyScale pelvis: axes=Z
  Measurement pelvis_d: apply=true
    MarkerPair: markers=(RASI RPSI)
    MarkerPair: markers=(LASI LPSI)
    BodyScale pelvis: axes=(X Y)
  Measurement r_thigh_length: apply=true
    MarkerPair: markers=(RASI RLFC)
    MarkerPair: markers=(RASI RMFC)
    BodyScale femur_r: axes=Y
    BodyScale patella_r: axes=(X Y Z)
  Measurement r_thigh_breadth: apply=true
    MarkerPair: markers=(RLFC RMFC)
    BodyScale femur_r: axes=(X Z)
  Measurement r_tibia_length: apply=true
    MarkerPair: markers=(RLFC RLMAL)
    MarkerPair: markers=(RMFC RMMAL)
    BodyScale tibia_r: axes=Y
    BodyScale talus_r: axes=Y
  Measurement r_tibia_breadth: apply=true
    MarkerPair: markers=(RLMAL RMMAL)
    BodyScale tibia_r: axes=(X Z)
    BodyScale talus_r: axes=(X Z)
  Measurement r_foot_length: apply=true
    MarkerPair: markers=(RCAL RMT1)
    MarkerPair: markers=(RCAL RMT5)
    BodyScale calcn_r: axes=(X Y)
    BodyScale toes_r: axes=(X Y)
  Measurement r_foot_width: apply=true
    MarkerPair: markers=(RMT1 RMT5)
    BodyScale calcn_r: axes=Z
    BodyScale toes_r: axes=Z
  Measurement l_thigh_length: apply=true
    MarkerPair: markers=(LASI LLFC)
    MarkerPair: markers=(LASI LMFC)
    BodyScale femur_l: axes=Y
    BodyScale patella_l: axes=(X Y Z)
  Measurement l_thigh_breadth: apply=true
    MarkerPair: markers=(LLFC LMFC)
    BodyScale femur_l: axes=(X Z)
  Measurement l_tibia_length: apply=true
    MarkerPair: markers=(LLFC LLMAL)
    MarkerPair: markers=(LMFC LMMAL)
    BodyScale tibia_l: axes=Y
    BodyScale talus_l: axes=Y
  Measurement l_tibia_breadth: apply=true
    MarkerPair: markers=(LLMAL LMMAL)
    BodyScale tibia_l: axes=(X Z)
    BodyScale talus_l: axes=(X Z)
  Measurement l_foot_length: apply=true
    MarkerPair: markers=(LCAL LMT1)
    MarkerPair: markers=(LCAL LMT5)
    BodyScale calcn_l: axes=(X Y)
    BodyScale toes_l: axes=(X Y)
  Measurement l_foot_width: apply=true
    MarkerPair: markers=(LMT1 LMT5)
    BodyScale calcn_l: axes=Z
    BodyScale toes_l: axes=Z
